# Rice, at farm

Dataset: openLCA process, unit process
Category: 11: Agriculture, Forestry, Fishing and Hunting/1111: Oilseed and Grain Farming
isCopyrightProtected: false

## Parameters
- yield_high: 1.5
- yield_low: 0.5

## Reference product
- Rice, at farm: 0.8 kg; = 1.0*yield_low_global

## Inputs from technosphere
- Nitrogen fertilizer, production mix, at plant [Canada]: 0.1 kg
- Quicklime, at plant [RNA]: 0.1 kg
- Electricity, AC, 2300-7650 V [United States]: 3.6 MJ; provider Electricity; at grid; consumption mix - US - US
- Transport, combination truck, average fuel mix [RNA]: 1 t*km

## Inputs from nature
- Water, fresh [resource, water]: 1 kg

## Emissions to nature
- Nitrogen [emission, water]: 1 kg
- Nitrogen [emission, ground]: 1 kg
- Nitrous oxide [emission, air]: 1 kg
- Methane [emission, air]: 0.1 kg
