# Electricity, at grid, CN, 2018

Dataset: openLCA process, unit process
Category: 22: Utilities/2211: Electric Power Generation, Transmission and Distribution
Geography: China
Time period: 2008-01-01 to 2014-12-31
Allocation method: no allocation
Data quality: US EPA - Process Pedigree Matrix (4;1)
Published in: Energy Information Administration (EIA)
isCopyrightProtected: false
restrictionsDescription: These U.S. LCI Database Project data ("Data") are provided by the National Renewable Energy Laboratory ("NREL"), operated by the Alliance for Sustainable Energy, LLC ("Alliance") for the US Department of Energy ("DOE") under Contract No. DE-AC36-08GO28308. The United States Government (the "Government") retains and the user acknowledges that the Government retains a non-exclusive, paid-up, irrevocable, worldwide license to publish or reproduce the published form of these data, or allow others to do so, for Government purposes.
Access to and use of these Data shall impose the following obligations on the user, as set forth in this Agreement. The user is granted the right, without any fee or cost, to use, copy, modify, alter, enhance and distribute these Data for any purpose whatsoever, provided that this entire notice appears in all copies of the Data. Any modification, alteration or enhancement of these data shall be identified and documented by the user. Further, the user agrees to credit the DOE/NREL/Alliance in any publication that results from the use of these Data. The names DOE/NREL/Alliance, however, may not be used in any advertising or publicity to endorse or promote any products or commercial entities unless specific written permission is obtained from DOE/NREL/Alliance. The user also understands that DOE/NREL/Alliance is not obligated to provide the user with any support, consulting, training or assistance of any kind with regard to the use of these Data or to provide the user with any updates, revisions or new versions of these Data.
YOU AGREE TO INDEMNIFY THE GOVERNMENT AND DOE/NREL/ALLIANCE, AND ITS SUBSIDIARIES, AFFILIATES, OFFICERS, AGENTS, AND EMPLOYEES AGAINST ANY CLAIM OR DEMAND, INCLUDING REASONABLE ATTORNEYS' FEES, RELATED TO YOUR USE OF THESE DATA. THESE DATA ARE PROVIDED BY DOE/NREL/ALLIANCE "AS IS" AND ANY EXPRESS OR IMPLIED WARRANTIES, INCLUDING BUT NOT LIMITED TO, THE IMPLIED WARRANTIES OF MERCHANTABILITY AND FITNESS FOR A PARTICULAR PURPOSE ARE DISCLAIMED. IN NO EVENT SHALL THE GOVERNMENT OR DOE/NREL/ALLIANCE BE LIABLE FOR ANY SPECIAL, INDIRECT OR CONSEQUENTIAL DAMAGES OR ANY DAMAGES WHATSOEVER, INCLUDING BUT NOT LIMITED TO CLAIMS ASSOCIATED WITH THE LOSS OF DATA OR PROFITS, WHICH MAY RESULT FROM AN ACTION IN CONTRACT, NEGLIGENCE OR OTHER TORTIOUS CLAIM THAT ARISES OUT OF OR IN CONNECTION WITH THE ACCESS, USE OR PERFORMANCE OF THESE DATA.

## General comment
Estimate of inputs for electricity of the grid using US electricity generating sources and IEA 2018 data for national electricity generation by source as a proxy for the average grid mix in China by electrical generation energy types. IEA Chart Title: Electricity generation by source, China (People's Republic of China and Hong Kong China) 1990-2018. Accounts for national average line loss extrapolated for data year 2018 from IEA data on line loss for China from 1971-2014; Electric power transmission and distribution losses (as % of output) estimated to be 5.68%. Per IEA, electric power transmission and distribution losses include losses in transmission between sources of supply and points of distribution and in the distribution to consumers, including pilferage.

## Technology
Average generation by source of electricity in China; Net Electricity Production is equal to the gross electricity production less the electrical energy absorbed by the generating auxiliaries and the losses in the main generator transformers. Hydro includes generation from pumped-hydro power stations. Coal also includes peat and oil shale where relevant. Per IEA, electric power transmission and distribution losses include losses in transmission between sources of supply and points of distribution and in the distribution to consumers, including pilferage.

## Geography
The annual production volumes of electricity production amounts by source are taken from IEA statistics for China and are valid for 2018. Accounts for national average line loss are extrapolated for 2018 from IEA data trends in China from 1971-2014.

## Reference product
- Electricity, at grid [CN]: 1 MJ

## Inputs from technosphere
- Electricity, residual fuel oil, at power plant [RNA]: 0.0016 MJ
- Electricity, solar, unspecified, at power plant: 0.026 MJ
- Electricity, waste, unspecified, at power plant: 0.002 MJ
- Electricity, nuclear, at power plant [RNA]: 0.043 MJ
- Electricity, biomass, at power plant [RNA]: 0.013 MJ
- Electricity, at wind power plant, unspecified: 0.054 MJ
- Electricity, hydropower, at power plant, unspecified: 0.18 MJ
- Electricity, natural gas, at power plant [RNA]: 0.035 MJ
- Electricity, bituminous coal, at power plant [RNA]: 0.7 MJ

## Inventory method
Attributional

## Modelling constants
Electricity total generation by source was expressed in gigawatt hours; Percentage of total electricity generation in 2018 in China (per EIA 2020 national data) by source type was used as input amounts in MJ for each electricity input (US electricity modules as proxy for electricity generation by fuel in China and EIA data as representative of average national grid mix).

## Completeness
TREATMENT OF MISSING ENVIRONMENTAL DATA
The dataset does not consider electromagnetic fields or SF6 emissions during production or deconstruction of switchgear or those during transmission. The dataset does not consider zinc emissions from zinc-coated steel transmission towers or PCP emissions from PCP-coated wooden distribution poles.

TREATMENT OF MISSING TECHNOSPHERE DATA
Installation, maintenance, and decommissioning activities are not include; transmission infrastructure and associated emissions as well as general capital equipment are excluded. Shares of electricity generation by geothermal, tidal, and solar thermal energy are not included as their cumulative contribution is < 0.01% for the 2018 data year.

MASS BALANCE
The energy imbalance for this unit process is ~5.68 MJ to account for electric line loss, which is extrapolated from IEA data trends from 1971-2014 for the data year 2018 and added as a % to input requirements per MJ output.

## Data selection
IEA data for China electricity generation by source were applied to electricity generation datasets from US as equivalent LCI data are unavailable for the China geographic scope.

## Data treatment
Statistical data on the 2018 China grid mix are from EIA and secondary data from USLCI are referenced in the unit process.

## Data collection
Secondary data for the annual production volumes of electricity production amounts by source are taken from IEA statistics for China for 2018. Accounts for national average line loss are extrapolated for 2018 from IEA data trends in China from 1971-2014.

## Sampling procedure
BOUNDARY CONDITIONS
Activities include generation of electricity by fuel type scaled to account for average national line losses in China.

DATA COLLECTION
Data are from IEA national statistics at www.iea.org.

UNCERTAINTY ESTIMATION
Uncertainty was not estimated and not included.

## Intended application
Created to represent grid mix of electricity for manufacturing in China;

SITUATION C2 -- ACCOUNTING
The intended application for this process is for accounting purposes as described in Goal Situation C1 from the ILCD Handbook's Detailed Guidance. LCA studies with this intended application offer "purely descriptive documentation of the system under analysis (e.g., a product, sector or country), without being interested in any potential consequences on other parts of the economy.” The studies categorized under Goal Situation C2 do NOT consider existing benefits outside the analyzed system such as recycling.

## Project
Scanner electricity inputs

## Review 
Data compiled from statistics were cross-checked with those reported by another database and previous LCI studies.
