# Anthracite coal, combusted in industrial boiler (copy)

Dataset: openLCA process, unit process
Category: 22: Utilities/2213: Water, Sewage and Other Systems/new category
Geography: Northern America
Time period: 1997-01-01 to 2003-12-31
Allocation method: no allocation
Generated by: Jeff Hernbloom
Published in: Franklin Associates (2003) Anthracite Combustion Industrial Boilers
isCopyrightProtected: false
restrictionsDescription: "These U.S. LCI Database Project data (""Data"") are provided by the National Renewable Energy Laboratory (""NREL""), operated by the Alliance for Sustainable Energy, LLC (""Alliance"") for the US Department of Energy (""DOE"") under Contract No. DE-AC36-08GO28308. The United States Government (the ""Government"") retains and the user acknowledges that the Government retains a non-exclusive, paid-up, irrevocable, worldwide license to publish or reproduce the published form of these data, or allow others to do so, for Government purposes.
Access to and use of these Data shall impose the following obligations on the user, as set forth in this Agreement. The user is granted the right, without any fee or cost, to use, copy, modify, alter, enhance and distribute these Data for any purpose whatsoever, provided that this entire notice appears in all copies of the Data. Any modification, alteration or enhancement of these data shall be identified and documented by the user. Further, the user agrees to credit the DOE/NREL/Alliance in any publication that results from the use of these Data. The names DOE/NREL/Alliance, however, may not be used in any advertising or publicity to endorse or promote any products or commercial entities unless specific written permission is obtained from DOE/NREL/Alliance. The user also understands that DOE/NREL/Alliance is not obligated to provide the user with any support, consulting, training or assistance of any kind with regard to the use of these Data or to provide the user with any updates, revisions or new versions of these Data.
YOU AGREE TO INDEMNIFY THE GOVERNMENT AND DOE/NREL/ALLIANCE, AND ITS SUBSIDIARIES, AFFILIATES, OFFICERS, AGENTS, AND EMPLOYEES AGAINST ANY CLAIM OR DEMAND, INCLUDING REASONABLE ATTORNEYS' FEES, RELATED TO YOUR USE OF THESE DATA. THESE DATA ARE PROVIDED BY DOE/NREL/ALLIANCE ""AS IS"" AND ANY EXPRESS OR IMPLIED WARRANTIES, INCLUDING BUT NOT LIMITED TO, THE IMPLIED WARRANTIES OF MERCHANTABILITY AND FITNESS FOR A PARTICULAR PURPOSE ARE DISCLAIMED. IN NO EVENT SHALL THE GOVERNMENT OR DOE/NREL/ALLIANCE BE LIABLE FOR ANY SPECIAL, INDIRECT OR CONSEQUENTIAL DAMAGES OR ANY DAMAGES WHATSOEVER, INCLUDING BUT NOT LIMITED TO CLAIMS ASSOCIATED WITH THE LOSS OF DATA OR PROFITS, WHICH MAY RESULT FROM AN ACTION IN CONTRACT, NEGLIGENCE OR OTHER TORTIOUS CLAIM THAT ARISES OUT OF OR IN CONNECTION WITH THE ACCESS, USE OR PERFORMANCE OF THESE DATA."

## General comment
This cradle to gate unit process is for the combustion of 1 kilogram of anthracite coal in industrial boilers in the US. Data were collected from 1997-2003 from industry and EPA sources. Data for ash and sulfur content for anthracite coal used by industry boilers were assumed to be the same as and collected from utility boiler data. Air and water emissions were calculated from EPA sources. An unknown allocation type was used for this dataset. The system boundary of this dataset includes incoming coal and transport, solid waste disposal, and air and water emissions and system boundary exclusions are unknown. The following technology was used: a mix of stoker boilers (70%), fluidized bed combustion boilers (20%), and pulverized coal boilers (10%). This metadata was populated based on a 2004 module report. Please reach out to USLCI@erg.com for more information.

## Technology
This process represents the combustion of anthracite coal using a mix of stoker boilers (70%), fluidized bed combustion boilers (20%), and pulverized coal boilers (10%). The process stages include: anthracite coal combustion in industrial boilers. Industrial combustion of coal is treated separately from combustion of coal for utility boilers because pollutants are often different. Industries often do not burn coal in boilers as large as or of the same type as the utility boilers. They also do not always burn the same kinds of coal. Statistics on coal quality show little difference in the ash and sulfur content between utility and industrial coal. However, particulate control is generally less efficient for industrial coal boilers, and sulfur oxide controls are rarely employed. A mix of boiler types were used in this dataset based on an industry split: stoker boilers (70%), fluidized bed combustion boilers (20%), and pulverized coal boilers (10%). It was assumed that cleaning wastes are less for industrial boilers than for utility boilers. Since few industrial boilers employ environmental control equipment, it was assumed that industrial boilers produce 10 percent of the fly ash and FGD wastes of utility boilers.

## Geography
This process is representative of the combustion of anthracite coal in industrial boilers in the US.

## Time period
This unit process is representative of data collected from 1997-2003 from industry and EPA sources. Data for ash and sulfur content for anthracite coal used by industry boilers were assumed to be the same as and collected from utility boiler data. Air and water emissions were calculated from EPA sources.

## Reference product
- Anthracite coal, combusted in industrial boiler [RNA]: 1 kg

## Inputs from technosphere
- Transport, combination truck, average fuel mix [RNA]: 0.17381 t*km
  Represents transportation from coal production/processing to industrial boiler.
- Transport, train, diesel powered [RNA]: 1.036 t*km
  Represents transportation from coal production/processing to industrial boiler.
- Anthracite coal, at mine [RNA]: 1 kg

## Waste to treatment
- Disposal, solid waste, unspecified, to unspecified treatment: 0.010649 kg
- Disposal, anthracite coal combustion byproducts, to unspecified reuse: 0.0136 kg

## Emissions to nature
- Carbon dioxide [emission, air]: 2.84 kg
- Cadmium [emission, air]: 4.9278e-8 kg
- Beryllium [emission, air]: 8.001e-8 kg
- Suspended solids, inorganic [emission, water]: 2.1828e-6 kg
- Arsenic [emission, air]: 1.0256e-7 kg
- Chromium [emission, air]: 7.034e-6 kg
- Formaldehyde [emission, air]: 6.6461e-6 kg
- Oils, unspecified [emission, water]: 1.0914e-6 kg
- Mercury [emission, air]: 6.6584e-7 kg
- Sulfur dioxide [emission, air]: 0.045449 kg
- Manganese [emission, air]: 9.5626e-7 kg
- Benzene [emission, air]: 9.4685e-5 kg
- Naphthalene [emission, air]: 6.5e-5 kg
  Sources for PAH data are old or unverifiable. Use this PAH data with caution.
- Methane [emission, air]: 2e-5 kg
- Biphenyl [emission, air]: 1.25e-5 kg
  Sources for PAH data are old or unverifiable. Use this PAH data with caution.
- Selenium [emission, air]: 6.5e-7 kg
- Phenanthrene [emission, air]: 3.4e-6 kg
  Sources for PAH data are old or unverifiable. Use this PAH data with caution.
- Hydrofluoric acid [emission, air]: 0.00049642 kg
- Lead [emission, air]: 2.8662e-6 kg
- Particulate matter [emission, air]: 0.003224 kg
- Nickel [emission, air]: 6.6041e-6 kg
- Particulate matter, > 2.5μm and ≤ 10μm [emission, air]: 0.00045399 kg
- Volatile organic compounds [emission, air]: 6.8487e-5 kg
- Acrolein [emission, air]: 4.392e-9 kg
- Carbon monoxide [emission, air]: 0.00068043 kg
- Acetaldehyde [emission, air]: 3.6778e-7 kg
- Nitrogen oxides [emission, air]: 0.0071206 kg

## Inventory method
An attributional LCI method was used to develop the dataset.

## Modelling constants
It is unknown if this process was adapted from another process

## Completeness
TREATMENT OF MISSING ENVIRONMENTAL DATA:
Elementary flows are cut-off at less than unknown based on unknown.

TREATMENT OF MISSING TECHNOSPHERE FLOWS
: Technosphere flows are cut-off at less than unknown based on unknown. Missing technosphere flows include unknown.

MASS BALANCE
: The mass imbalance for this unit process is unknown.

## Data collection
All data were collected from 1997-2003. Data were collected from industry and EPA sources. Data for ash and sulfur content for anthracite coal used by industry were assumed to be the same as and collected from utility data. Air and water emissions were calculated from EPA sources.

## Sampling procedure
BOUNDARY CONDITIONS:
The system boundary includes: incoming coal and transport, solid waste disposal, and air and water emissions. This system boundary excludes unknown.
DATA COLLECTION:
For material inputs, data collection was based on unknown. For other inputs, data collection was based on unknown.

UNCERTAINTY ESTIMATION:
Uncertainty was estimated based on unknown.

## Intended application
The intended application for this process is for accounting purposes as described in Goal Situation C1 from the ILCD Handbook's Detailed Guidance. LCA studies with this intended application offer "purely descriptive documentation of the system under analysis (e.g., a product, sector or country), without being interested in any potential consequences on other parts of the economy.” The studies categorized under Goal Situation C1 do NOT consider existing benefits outside the analyzed system such as recycling. The target audience of this dataset is LCA practitioners, industry, the general public, and policymakers. This model was originally built for an LCA and was originally developed and analyzed with an unknown impact assessment method. The completeness of elementary flows is unknown and it is unknown if this is an update to a previous USLCI dataset.

## Project
This project was funded by unknown under an unknown grant/contract.

## Sources
- DOE
- EPA
- unspecified
- Franklin Associates (2003) Anthracite Combustion Industrial Boilers
- unspecified
- Minerals Yearbook
- EPA
- EPA
- EIA
- unspecified
- Franklin Associates (2003) Estimate
- unspecified
- EPA
- Speight
