# Steam methane reforming plant; small-scale; construction

Dataset: openLCA process, unit process
Category: 23: Construction/2362: Nonresidential Building Construction
Geography: United States
Time period: 2015-01-01 to 2022-12-31
Allocation method: no allocation
Data quality: US EPA - Process Pedigree Matrix (4;5)
Generated by: National Renewable Energy Laboratory
Owner: National Renewable Energy Laboratory
Published in: Schreiber, A
isCopyrightProtected: false
restrictionsDescription: These U.S. LCI Database Project data ("Data") are provided by the National Renewable Energy Laboratory ("NREL"), operated by the Alliance for Sustainable Energy, LLC ("Alliance") for the US Department of Energy ("DOE") under Contract No. DE-AC36-08GO28308. The United States Government (the "Government") retains and the user acknowledges that the Government retains a non-exclusive, paid-up, irrevocable, worldwide license to publish or reproduce the published form of these data, or allow others to do so, for Government purposes.
Access to and use of these Data shall impose the following obligations on the user, as set forth in this Agreement. The user is granted the right, without any fee or cost, to use, copy, modify, alter, enhance and distribute these Data for any purpose whatsoever, provided that this entire notice appears in all copies of the Data. Any modification, alteration or enhancement of these data shall be identified and documented by the user. Further, the user agrees to credit the DOE/NREL/Alliance in any publication that results from the use of these Data. The names DOE/NREL/Alliance, however, may not be used in any advertising or publicity to endorse or promote any products or commercial entities unless specific written permission is obtained from DOE/NREL/Alliance. The user also understands that DOE/NREL/Alliance is not obligated to provide the user with any support, consulting, training or assistance of any kind with regard to the use of these Data or to provide the user with any updates, revisions or new versions of these Data.
YOU AGREE TO INDEMNIFY THE GOVERNMENT AND DOE/NREL/ALLIANCE, AND ITS SUBSIDIARIES, AFFILIATES, OFFICERS, AGENTS, AND EMPLOYEES AGAINST ANY CLAIM OR DEMAND, INCLUDING REASONABLE ATTORNEYS' FEES, RELATED TO YOUR USE OF THESE DATA. THESE DATA ARE PROVIDED BY DOE/NREL/ALLIANCE "AS IS" AND ANY EXPRESS OR IMPLIED WARRANTIES, INCLUDING BUT NOT LIMITED TO, THE IMPLIED WARRANTIES OF MERCHANTABILITY AND FITNESS FOR A PARTICULAR PURPOSE ARE DISCLAIMED. IN NO EVENT SHALL THE GOVERNMENT OR DOE/NREL/ALLIANCE BE LIABLE FOR ANY SPECIAL, INDIRECT OR CONSEQUENTIAL DAMAGES OR ANY DAMAGES WHATSOEVER, INCLUDING BUT NOT LIMITED TO CLAIMS ASSOCIATED WITH THE LOSS OF DATA OR PROFITS, WHICH MAY RESULT FROM AN ACTION IN CONTRACT, NEGLIGENCE OR OTHER TORTIOUS CLAIM THAT ARISES OUT OF OR IN CONNECTION WITH THE ACCESS, USE OR PERFORMANCE OF THESE DATA.

## General comment
This cradle to gate unit process is for the construction of one small-scale steam methane reforming plant. This model is based on European data but has been adapted to represent US conditions. Data were originally collected by Schreiber et al., 2020 and have been adapted by the National Renewable Energy Laboratory (NREL). Details for this dataset are restricted due to confidentiality. The system boundary of this dataset includes the main incoming materials with transportation and air emissions but excludes periphery materials such as cables and motors. It is important to note that this model is a rough estimation of the materials and emissions associated with constructing a small-scale steam methane reforming plant. This data should not be used for the construction of a large-scale plant due to different designs.

## Technology
This process represents the construction of a small-scale steam methane reforming plant. Construction details are limited due to confidentiality.

## Geography
This process is representative of the construction a small-scale steam methane reforming plant under US conditions. This study was originally conducted under European conditions. The construction process is similar in Europe and the US.

## Time period
This unit process is representative of data collected from a study that was published in 2020. The data is based on industry process designs and simulations so specific details are confidential. This dataset has been adapted recently to reflect US conditions and to allocate flows as needed.

## Reference product
- Steam methane reforming plant; construction: 1 Item(s)

## Inputs from technosphere
- Steel, stainless 304, flat rolled coil [RNA]: 3.272e6 kg
  Surrogate for "steel production, converter, chromium steel 18/8" and "sheet rolling, chromium steel"
- Aluminum, sheet, coated, at plant [RNA]: 27000 kg
- Iron scrap, at plant: 539559 kg
- Crude oil, production mixture, at extraction [RNA]: 237021 kg
- Concrete, at plant: 4267.5 m3
- Water, process, deionized: 3.43391e7 kg
  Deionized water production and supply

## Inputs from nature
- Coal [resource, ground, subterranean]: 1.36133e7 MJ; = 544531.0078*25
  Coal calorific value = 25 MJ/kg
- Limestone [resource, ground]: 770799 kg
- Iron [resource, ground]: 496202 kg
  Iron ore and iron scrap

## Waste to treatment
- Disposal, industrial solid waste: 0.0076608 kg

## Emissions to nature
- Carbon dioxide [emission, air]: 2.04659e6 kg
  Fossil carbon dioxide
- Particulate matter [emission, air]: 0.00129 kg
- Carbon monoxide [emission, air]: 7.4e-5 kg
- Sulfur oxides [emission, air]: 0.0012825 kg
- Nitrous oxide [emission, air]: 2.92e-6 kg
- Nitrogen oxides [emission, air]: 0.0002214 kg
- Hydrocarbons [emission, air]: 0.0002856 kg
  Non-methane hydrocarbons

## Inventory method
An attributional LCI method was used to develop the dataset.

## Modelling constants
This process was adapted from the Schreiber et al., 2020.

## Completeness
TREATMENT OF MISSING ENVIRONMENTAL DATA: It is unknown whether a cutoff for elementary flows was used in the original study.

TREATMENT OF MISSING TECHNOSPHERE FLOWS: It is unknown whether a cutoff for elementary flows was used in the original study. Missing technosphere flows are unknown.

MASS BALANCE: The mass imbalance for this unit process is unknown.

## Data selection
Data for the construction of a small-scale steam methane reforming plant was collected and adapted from the original study, Schreiber et al., 2020. The data in the original study was collected from design and material estimations.

## Data treatment
The original model used European incoming datasets, which have been switched to US based incoming datasets in this model. Flows have been adapted and emissions have been calculated for this dataset.

## Data collection
Data were collected from Schreiber et al., 2020. The data for this paper was obtained from confidential modeling data and estimations and industry process designs.

## Sampling procedure
BOUNDARY CONDITIONS: The system boundary includes upstream burdens from incoming materials. Periphery materials such as cables and motors are excluded from the system boundary.

DATA COLLECTION: Data were collected from Schreiber et al., 2020.

UNCERTAINTY ESTIMATION: It is unknown whether an uncertainty estimation was performed.

## Intended application
The intended application for this process is for accounting purposes as described in Goal Situation C1 from the ILCD Handbook's Detailed Guidance. LCA studies with this intended application offer "purely descriptive documentation of the system under analysis (e.g., a product, sector or country), without being interested in any potential consequences on other parts of the economy.” The studies categorized under Goal Situation C1 do NOT consider existing benefits outside the analyzed system such as recycling. The target audience of this dataset is LCA practitioners, industry, the general public, and policymakers. This model was originally built for an LCA and was originally developed and analyzed with the ReCiPe and CML2001 impact assessment methods. The completeness of elementary flows is unknown and it is not an update to a previous USLCI dataset.

## Project
This project was funded by NREL.

## Sources
- Schreiber, A
