# Proton exchange water electrolysis plant; construction

Dataset: openLCA process, unit process
Category: 23: Construction/2362: Nonresidential Building Construction
Geography: United States
Time period: 2017-01-01 to 2017-12-31
Allocation method: no allocation
Data quality: US EPA - Process Pedigree Matrix (4;5)
Generated by: National Renewable Energy Laboratory
Owner: National Renewable Energy Laboratory
Published in: Bareiß, 2019
isCopyrightProtected: false
restrictionsDescription: These U.S. LCI Database Project data ("Data") are provided by the National Renewable Energy Laboratory ("NREL"), operated by the Alliance for Sustainable Energy, LLC ("Alliance") for the US Department of Energy ("DOE") under Contract No. DE-AC36-08GO28308. The United States Government (the "Government") retains and the user acknowledges that the Government retains a non-exclusive, paid-up, irrevocable, worldwide license to publish or reproduce the published form of these data, or allow others to do so, for Government purposes.
Access to and use of these Data shall impose the following obligations on the user, as set forth in this Agreement. The user is granted the right, without any fee or cost, to use, copy, modify, alter, enhance and distribute these Data for any purpose whatsoever, provided that this entire notice appears in all copies of the Data. Any modification, alteration or enhancement of these data shall be identified and documented by the user. Further, the user agrees to credit the DOE/NREL/Alliance in any publication that results from the use of these Data. The names DOE/NREL/Alliance, however, may not be used in any advertising or publicity to endorse or promote any products or commercial entities unless specific written permission is obtained from DOE/NREL/Alliance. The user also understands that DOE/NREL/Alliance is not obligated to provide the user with any support, consulting, training or assistance of any kind with regard to the use of these Data or to provide the user with any updates, revisions or new versions of these Data.
YOU AGREE TO INDEMNIFY THE GOVERNMENT AND DOE/NREL/ALLIANCE, AND ITS SUBSIDIARIES, AFFILIATES, OFFICERS, AGENTS, AND EMPLOYEES AGAINST ANY CLAIM OR DEMAND, INCLUDING REASONABLE ATTORNEYS' FEES, RELATED TO YOUR USE OF THESE DATA. THESE DATA ARE PROVIDED BY DOE/NREL/ALLIANCE "AS IS" AND ANY EXPRESS OR IMPLIED WARRANTIES, INCLUDING BUT NOT LIMITED TO, THE IMPLIED WARRANTIES OF MERCHANTABILITY AND FITNESS FOR A PARTICULAR PURPOSE ARE DISCLAIMED. IN NO EVENT SHALL THE GOVERNMENT OR DOE/NREL/ALLIANCE BE LIABLE FOR ANY SPECIAL, INDIRECT OR CONSEQUENTIAL DAMAGES OR ANY DAMAGES WHATSOEVER, INCLUDING BUT NOT LIMITED TO CLAIMS ASSOCIATED WITH THE LOSS OF DATA OR PROFITS, WHICH MAY RESULT FROM AN ACTION IN CONTRACT, NEGLIGENCE OR OTHER TORTIOUS CLAIM THAT ARISES OUT OF OR IN CONNECTION WITH THE ACCESS, USE OR PERFORMANCE OF THESE DATA.

## General comment
This cradle to gate unit process is for the construction of one proton exchange membrane water electrolysis(PEMWE) plant. This model is based on an estimate of the balance of plant data for one PEMWE facility and have been adapted to represent US conditions. Data were originally collected by Bareiß et al., 2019 and have been adapted by the National Renewable Energy Laboratory (NREL). The system boundary of this dataset includes the main incoming materials with transportation.

## Technology
This process represents the production of a PEWME plant. The structure is made up of a concrete foundation with a 20ft shipping container on top. A water pump and electronics are included as well as ancillary equipment and materials.

## Geography
This process is representative of the production of a PEWME plant under US conditions. This study was originally conducted under German conditions but this dataset has been adapted to represent US conditions.

## Time period
This unit process is representative of 2017 data collected from a study that was published in 2019. This dataset has been adapted recently to reflect US conditions and to scale it to a consistent yearly production.

## Reference product
- Proton exchange membrane water electrolyzer plant; construction: 1 Item(s)

## Inputs from technosphere
- Residual fuel oil, combusted in industrial boiler [RNA]: 2889.54 m3; = (10800*11.51)/43.02
  Surrogate for "heat production, light fuel oil, at boiler 100kW condensing, non-modulating". Assumed 11.51 m3/kg and 43.02 MJ/kg
- Steel; hot rolled coil, at plant: 6700 kg; = 1900+4800
  Surrogate for 1900 kg of high alloyed steel and 4800 kg low alloyed steel
- Concrete, at plant: 2.33 m3
- Polyethylene, high density, HDPE, virgin resin, at plant: 300 kg
- Electricity, AC, 2300-7650 V: 31255.2 MJ; = 3.6 * (1440+7242); provider Electricity; at grid; consumption mix - US - US
  Surrogate for 1440 kWh of "market group for electricity, low voltage" and 7242 kWh of "market group for electricity, medium voltage"
- Natural gas, combusted in industrial equipment, 1.357 m3/kg, 52.13 MJ/kg [RNA]: 331.271 m3; = (12726*1.357)/52.13; provider Natural gas, combusted in industrial equipment
  Surrogate for "heat production, natural gas, at industrial furnace low-NOx >100kW". Assumed 1.357 m3/kg and 52.13 MJ/kg
- Electronic component, unspecified, at plant: 1100 kg
  Surrogate for "electronic parts"
- Silica gel, at plant: 200 kg
- Transport, train, diesel powered [RNA]: 375 t*km
- Transport, combination truck, average fuel mix [RNA]: 188 t*km

## Inputs from nature
- Copper [resource, ground, subterranean]: 100 kg
- Aluminum [resource, ground, subterranean]: 100 kg

## Inventory method
An attributional LCI method was used to develop the dataset.

## Modelling constants
This process was adapted from Bareiß et al., 2019.

## Completeness
TREATMENT OF MISSING ENVIRONMENTAL DATA: It is unknown whether a cutoff for elementary flows was used in the original study.

TREATMENT OF MISSING TECHNOSPHERE FLOWS: It is unknown whether a cutoff for elementary flows was used in the original study. Missing technosphere flows are unknown.

MASS BALANCE: The mass imbalance for this unit process is unknown.

## Data selection
Data for the construction of a PEMWE plant was collected and adapted from the original study, Bareiß et al., 2019.

## Data treatment
The original model used European incoming datasets, which have been switched to US based incoming datasets in this model. Flows have been adapted and emissions have been calculated for this dataset.

## Data collection
Data were collected from Bareiß et al., 2019.

## Sampling procedure
BOUNDARY CONDITIONS: The system boundary includes upstream burdens from incoming materials and process energy.

DATA COLLECTION: Data were collected from Bareiß et al., 2019.

UNCERTAINTY ESTIMATION: It is unknown whether an uncertainty estimation was performed.

## Intended application
The intended application for this process is for accounting purposes as described in Goal Situation C1 from the ILCD Handbook's Detailed Guidance. LCA studies with this intended application offer "purely descriptive documentation of the system under analysis (e.g., a product, sector or country), without being interested in any potential consequences on other parts of the economy.” The studies categorized under Goal Situation C1 do NOT consider existing benefits outside the analyzed system such as recycling. The target audience of this dataset is LCA practitioners, industry, the general public, and policymakers. This model was originally built for an LCA and was originally developed and analyzed with the ReCiPe impact assessment methods. The completeness of elementary flows is unknown and it is not an update to a previous USLCI dataset.

## Project
This project was funded by NREL.

## Sources
- Bareiß, 2019
