# Hydrogen; solid oxide electrolysis, at plant

Dataset: openLCA process, unit process
Category: 31-33: Manufacturing/3251: Basic Chemical Manufacturing
Geography: United States
Time period: 2015-01-01 to 2022-12-26
Allocation method: no allocation
Data quality: US EPA - Process Pedigree Matrix (4;5)
Generated by: National Renewable Energy Laboratory
Owner: National Renewable Energy Laboratory
Published in: Schreiber, A
isCopyrightProtected: false
restrictionsDescription: These U.S. LCI Database Project data ("Data") are provided by the National Renewable Energy Laboratory ("NREL"), operated by the Alliance for Sustainable Energy, LLC ("Alliance") for the US Department of Energy ("DOE") under Contract No. DE-AC36-08GO28308. The United States Government (the "Government") retains and the user acknowledges that the Government retains a non-exclusive, paid-up, irrevocable, worldwide license to publish or reproduce the published form of these data, or allow others to do so, for Government purposes.
Access to and use of these Data shall impose the following obligations on the user, as set forth in this Agreement. The user is granted the right, without any fee or cost, to use, copy, modify, alter, enhance and distribute these Data for any purpose whatsoever, provided that this entire notice appears in all copies of the Data. Any modification, alteration or enhancement of these data shall be identified and documented by the user. Further, the user agrees to credit the DOE/NREL/Alliance in any publication that results from the use of these Data. The names DOE/NREL/Alliance, however, may not be used in any advertising or publicity to endorse or promote any products or commercial entities unless specific written permission is obtained from DOE/NREL/Alliance. The user also understands that DOE/NREL/Alliance is not obligated to provide the user with any support, consulting, training or assistance of any kind with regard to the use of these Data or to provide the user with any updates, revisions or new versions of these Data.
YOU AGREE TO INDEMNIFY THE GOVERNMENT AND DOE/NREL/ALLIANCE, AND ITS SUBSIDIARIES, AFFILIATES, OFFICERS, AGENTS, AND EMPLOYEES AGAINST ANY CLAIM OR DEMAND, INCLUDING REASONABLE ATTORNEYS' FEES, RELATED TO YOUR USE OF THESE DATA. THESE DATA ARE PROVIDED BY DOE/NREL/ALLIANCE "AS IS" AND ANY EXPRESS OR IMPLIED WARRANTIES, INCLUDING BUT NOT LIMITED TO, THE IMPLIED WARRANTIES OF MERCHANTABILITY AND FITNESS FOR A PARTICULAR PURPOSE ARE DISCLAIMED. IN NO EVENT SHALL THE GOVERNMENT OR DOE/NREL/ALLIANCE BE LIABLE FOR ANY SPECIAL, INDIRECT OR CONSEQUENTIAL DAMAGES OR ANY DAMAGES WHATSOEVER, INCLUDING BUT NOT LIMITED TO CLAIMS ASSOCIATED WITH THE LOSS OF DATA OR PROFITS, WHICH MAY RESULT FROM AN ACTION IN CONTRACT, NEGLIGENCE OR OTHER TORTIOUS CLAIM THAT ARISES OUT OF OR IN CONNECTION WITH THE ACCESS, USE OR PERFORMANCE OF THESE DATA.

## General comment
This cradle to gate unit process is for 1 kilogram of hydrogen produced from solid oxide electrolysis. This model is based on European balance of plant data but has been adapted to represent US conditions. Data were originally collected by Schreiber et al., 2020 and have been adapted by the National Renewable Energy Laboratory (NREL). The output of this system is syngas which is composed of hydrogen and carbon monoxide, a stoichiometric (molar mass) allocation was used to allocate between hydrogen and carbon monoxide (2:1). The system boundary of this dataset includes the solid oxide electrolysis process and incoming materials with transportation and excludes carbon dioxide from direct air capture and the syngas separation process.

## Technology
This process represents the production of hydrogen via solid oxide electrolysis. During this process, water is split and carbon dioxide is activated to form syngas. Syngas is then allocated stoichiometrically between hydrogen and carbon monoxide. (Schreiber et al., 2020)

## Geography
This process is representative of the production of hydrogen from solid oxide electrolysis under US conditions. This study was originally conducted under European conditions but this dataset has been adapted to represent US conditions.

## Time period
This unit process is representative of data collected from a study that was published in 2020. The data is based on a balance of plant. This dataset has been adapted recently to reflect US conditions and to allocate flows as needed.

## Reference product
- Hydrogen, at plant: 1 kg

## Inputs from technosphere
- Solid oxide electrolysis plant; construction: 2.72e-6 Item(s)
- Water, process, deionized: 9.04 kg
  Surrogate for "Water production and supply, deioninzed"
- Solid oxide electrolysis stack; 150 kW, at plant: 1.12e-5 Item(s)
- Electricity, AC, 2300-7650 V: 172.8 MJ; provider Electricity; at grid; consumption mix - US - US
  Surrogate for "market group for electricity, medium voltage"
- Solid oxide electrolysis cell; at plant: 0.016 Item(s)

## Emissions to nature
- Oxygen [resource, air]: 12 kg

## Inventory method
An attributional LCI method was used to develop the dataset.

## Modelling constants
This process was adapted from Schreiber et al., 2020.

## Completeness
TREATMENT OF MISSING ENVIRONMENTAL DATA: It is unknown whether a cutoff for elementary flows was used in the original study.

TREATMENT OF MISSING TECHNOSPHERE FLOWS: It is unknown whether a cutoff for elementary flows was used in the original study. Missing technosphere flows are unknown.

MASS BALANCE: The mass imbalance for this unit process is unknown.

## Data selection
Data for the production of hydrogen from solid oxide electrolysis reforming was collected and adapted from the original study, Schreiber et al., 2020. The data in the original study was collected from process designs and simulations. The original study included a process for direct air capture of carbon dioxide which was not included in this model as it was allocated to carbon monoxide production, not hydrogen.

## Data treatment
A stoichiometric allocation of 2:1 was used to assign flows to the hydrogen and carbon monoxide. The original model used European incoming datasets, specifically German, which have been switched to US based incoming datasets in this model. The inventory has been adapted to represent 8760 h load per year.

## Data collection
Data were collected from Schreiber et al., 2020. The data for this paper was obtained from confidential modeling data and estimations and industry process designs.

## Sampling procedure
BOUNDARY CONDITIONS: The system boundary includes upstream burdens from incoming materials and process energy. Direct air capture of carbon dioxide and the syngas separation process are excluded from the system boundary.

DATA COLLECTION: Data were collected from Schreiber et al., 2020.

UNCERTAINTY ESTIMATION: It is unknown whether an uncertainty estimation was performed.

## Intended application
The intended application for this process is for accounting purposes as described in Goal Situation C1 from the ILCD Handbook's Detailed Guidance. LCA studies with this intended application offer "purely descriptive documentation of the system under analysis (e.g., a product, sector or country), without being interested in any potential consequences on other parts of the economy.” The studies categorized under Goal Situation C1 do NOT consider existing benefits outside the analyzed system such as recycling. The target audience of this dataset is LCA practitioners, industry, the general public, and policymakers. This model was originally built for an LCA and was originally developed and analyzed with the ReCiPe and CML2001 impact assessment methods. The completeness of elementary flows is unknown and it is not an update to a previous USLCI dataset.

## Project
This project was funded by NREL.

## Sources
- Schreiber, A
