# Chlorine; chlor-alkali average, membrane cell; at plant

Dataset: openLCA process, unit process
Category: 31-33: Manufacturing/3251: Basic Chemical Manufacturing
Geography: Northern America
Time period: 2014-12-30 to 2017-12-29
Allocation method: no allocation
Data quality: US EPA - Process Pedigree Matrix (4;1)
Generated by: Franklin Associates, A Division of ERG
Owner: American Chemistry Council
Published in: Cradle-to-Gate Life Cycle Analysis of Polyvinyl Chloride (PVC) Resin. American Chemistry Council (ACC). 2021 (currently draft form)
isCopyrightProtected: false
restrictionsDescription: These U.S. LCI Database Project data ("Data") are provided by the National Renewable Energy Laboratory ("NREL"), operated by the Alliance for Sustainable Energy, LLC ("Alliance") for the US Department of Energy ("DOE") under Contract No. DE-AC36-08GO28308. The United States Government (the "Government") retains and the user acknowledges that the Government retains a non-exclusive, paid-up, irrevocable, worldwide license to publish or reproduce the published form of these data, or allow others to do so, for Government purposes.
Access to and use of these Data shall impose the following obligations on the user, as set forth in this Agreement. The user is granted the right, without any fee or cost, to use, copy, modify, alter, enhance and distribute these Data for any purpose whatsoever, provided that this entire notice appears in all copies of the Data. Any modification, alteration or enhancement of these data shall be identified and documented by the user. Further, the user agrees to credit the DOE/NREL/Alliance in any publication that results from the use of these Data. The names DOE/NREL/Alliance, however, may not be used in any advertising or publicity to endorse or promote any products or commercial entities unless specific written permission is obtained from DOE/NREL/Alliance. The user also understands that DOE/NREL/Alliance is not obligated to provide the user with any support, consulting, training or assistance of any kind with regard to the use of these Data or to provide the user with any updates, revisions or new versions of these Data.
YOU AGREE TO INDEMNIFY THE GOVERNMENT AND DOE/NREL/ALLIANCE, AND ITS SUBSIDIARIES, AFFILIATES, OFFICERS, AGENTS, AND EMPLOYEES AGAINST ANY CLAIM OR DEMAND, INCLUDING REASONABLE ATTORNEYS' FEES, RELATED TO YOUR USE OF THESE DATA. THESE DATA ARE PROVIDED BY DOE/NREL/ALLIANCE "AS IS" AND ANY EXPRESS OR IMPLIED WARRANTIES, INCLUDING BUT NOT LIMITED TO, THE IMPLIED WARRANTIES OF MERCHANTABILITY AND FITNESS FOR A PARTICULAR PURPOSE ARE DISCLAIMED. IN NO EVENT SHALL THE GOVERNMENT OR DOE/NREL/ALLIANCE BE LIABLE FOR ANY SPECIAL, INDIRECT OR CONSEQUENTIAL DAMAGES OR ANY DAMAGES WHATSOEVER, INCLUDING BUT NOT LIMITED TO CLAIMS ASSOCIATED WITH THE LOSS OF DATA OR PROFITS, WHICH MAY RESULT FROM AN ACTION IN CONTRACT, NEGLIGENCE OR OTHER TORTIOUS CLAIM THAT ARISES OUT OF OR IN CONNECTION WITH THE ACCESS, USE OR PERFORMANCE OF THESE DATA.

## General comment
Includes material and energy requirements and environmental emissions for one kilogram of Chlorine production at the Chlor-alkali plant only (gate to gate). This data represents the production of chlorine using the membrane technology. Allocation has been given to each product (chlorine, sodium hydroxide, and hydrogen) in the chlori-alkali process.

## Technology
All data providers used the membrane technology to produce chlorine, as well as sodium hydroxide and hydrogen. Membrane cell electrolysis is the most recent of the Chlor-alkali technologies. The membrane cell is named as such since the anode and cathodes are separated by a perfluoropolymer cation exchange membrane. Saturated brine solution is passed through the anode compartment of the cell, where the chloride ions are oxidized into chlorine gas. The electric field causes sodium ions to pass through the membrane to the cathode. Due to the oxidation of the water, hydrogen gas and hydroxide ions form and produce sodium hydroxide at the cathode. According to The Chlorine Institute, " membrane electrolyzers typically produce 30% to 35% sodium hydroxide," which is then concentrated using evaporators. A 50% solution is typical from this process and is a co-product in the Chlor-alkali process. Hydrogen can be captured for use as a fuel or material input, sold as a coproduct, or released to the air depending on the chlor-alkali plant.

## Geography
For the Chlor-alkali primary data, companies were requested to provide data for the year 2015, the most recent full year of Chlor-alkali production prior to the project initiation date. Two of the three companies provided data for the year 2015, with the remaining providing 2017 data. After reviewing individual company data in comparison to the average, each manufacturer verified their data was representative of an average year for Chlorine production at their company.

The geographic scope of the analysis is the manufacture of Chlorine using the membrane technology in North America. All chlor-alkali data collected were from plants in the United States and incoming material (sodium chloride in brine) was modeled using ecoinvent (adapted to US conditions).

## Time period
All primary data were collected from 2015 and 2017

## Reference product
- Chlorine; chlor-alkali average, membrane cell; at plant: 1 kg

## Inputs from technosphere
- Sodium chloride, brine solution, at plant: 1.035 kg
  using stoichiometric allocation
- Transport, barge, average fuel mix [RNA]: 0.13 t*km
- Transport, train, diesel powered [RNA]: 0.00074 t*km
- Sulfuric acid, at plant [RNA]: 0.0092 kg
  Allocated to chlorine as used in chlorine drying
- Electricity, AC, 2300-7650 V: 2.1204 MJ; provider Electricity; at grid; consumption mix - US - US
- Natural gas, combusted in industrial boiler [RNA]: 0.0762 m3
- Hydrochloric acid, without water, in 30% solution state, at plant [RNA]: 0.0173 kg
  Mass allocation used as this acidifies the brine
- Electricity, at cogen, for natural gas turbine [US]: 0.622 kWh
- Transport, pipeline, unspecified petroleum products [RNA]: 0.025 t*km
- Transport, combination truck, diesel powered [RNA]: 0.00013 t*km

## Inputs from nature
- Water [resource, water]: 0.00097 m3

## Waste to treatment
- Disposal, solid waste, process, to sanitary landfill: 0.00066 kg

## Emissions to nature
- Copper [emission, water]: 1e-9 kg
  This data was reported by fewer than three companies. To indicate known emissions while protecting the confidentiality of individual company responses, the emission is reported only by order of magnitude.
- Suspended solids, inorganic [emission, water]: 1e-5 kg
  (same comment as for Copper)
- Particulate matter, ≤ 2.5μm [emission, air]: 1e-7 kg
  (same comment as for Copper)
- Potassium [emission, water]: 0.0001 kg
  (same comment as for Copper)
- Chloroform [emission, water]: 1e-8 kg
  (same comment as for Copper)
- Chlorine [emission, water]: 1e-8 kg
  (same comment as for Copper)
- Zinc [emission, water]: 1e-8 kg
  (same comment as for Copper)
- Carbon monoxide [emission, air]: 0.0001 kg
  (same comment as for Copper)
- Sodium hydroxide [emission, air]: 1e-7 kg
  (same comment as for Copper)
- Chloride [emission, water]: 1e-7 kg
  (same comment as for Copper)
- Sulfuric acid [emission, air]: 1e-8 kg
  (same comment as for Copper)
- Carbon tetrachloride [emission, air]: 1e-9 kg
  (same comment as for Copper)
- Particulate matter, > 2.5μm and ≤ 10μm [emission, air]: 1e-7 kg
  (same comment as for Copper)
- Particulate matter [emission, air]: 1e-5 kg
  (same comment as for Copper)
- Chlorine [emission, air]: 3.5e-6 kg
- Total Organic Carbon [emission, water]: 1e-6 kg
  (same comment as for Copper)

## Inventory method
Attributional; Compatible with TRACI

## Modelling constants
LCI data for the production of Chlorine were collected from three producers (three plants) in North America – all in the United States. Two companies provided data for the year 2015, while one provided data from the year 2017. After reviewing individual company data in comparison to the average, each manufacturer verified data from the year for which they provided data was representative of an average year for Chlro-alkali production at their company. Mass allocation was used to allocate all inputs and outputs to each product and co-product with the following exceptions:
• The sodium chloride input was given stoichiometric allocation among the three products. As the plants providing data produced for sale only chlorine, sodium hydroxide and hydrogen, the sodium chloride input was split between the chlorine and sodium hydroxide using the stoichiometry of the chemical reaction.
• The sulfuric acid input was used specifically to dry the chlorine and so has fully been allocated to the chlorine product.
• All chlorine-based air emissions or waterborne wastes are allocated to the chlorine product.
• All sodium hydroxide emissions are allocated to the sodium hydroxide product.
• All hydrogen emissions are allocated to the hydrogen product.

## Completeness
Data evaluation procedures and criteria were applied consistently to all primary data provided by the participating producers for all data collected. All primary data obtained specifically for this study were considered the most representative available for the systems studied. Data sets were reviewed for completeness and material balances, and follow-up was conducted as needed to resolve any questions about the input and output flows, process technology, etc. The aggregated averaged datasets were also reviewed by the providing companies as compared to the provided dataset. Companies were requested to review whether their data were complete and to comment about their or the average dataset.

## Data selection
All Chlor-alkali production data was sourced from primary producers.

## Data treatment
A weighted average was calculated from the data collected and used to develop the LCA model. Three main coproducts (chlorine, sodium hydroxide and hydrogen) are produced during the Chlor-alkali process and allocation was performed after the average was created. Mass allocation was used to allocate all inputs and outputs to each product and co-product with the following exceptions:
• The sodium chloride input was given stoichiometric allocation among the three products. As the plants providing data produced for sale only chlorine, sodium hydroxide and hydrogen, the sodium chloride input was split between the chlorine and sodium hydroxide using the stoichiometry of the chemical reaction.
• The sulfuric acid input was used specifically to dry the chlorine and so has fully been allocated to the chlorine product.
• All chlorine-based air emissions or waterborne wastes are allocated to the chlorine product.
• All sodium hydroxide emissions are allocated to the sodium hydroxide product.
• All hydrogen emissions are allocated to the hydrogen product.
Although some chemicals are produced within the chlor-alkali plant (e.g. hydrochloric acid), they are not considered a coproduct. The average chlor-alkali dataset was reviewed and accepted respectively by each data provider.

## Data collection
All primary data were collected for 2015 or 2017.

## Sampling procedure
BOUNDARY CONDITIONS: The unit process boundary includes the manufacturing of chlorine at the chlor-alkali plant, including incoming transportation for each material.

DATA COLLECTION: The primary data for the life cycle inventory of the production of chlor-alkali were collected from three producers (three plants) located in the United States in 2015 & 2017. A weighted average was calculated from the data collected and used to develop the LCA model. For this process the data sets are based on actual plant data reported by plant personnel. Supporting background data were drawn from credible, widely used databases including the US LCI database, GREET, and Ecoinvent, as well as secondary data sources.

UNCERTAINTY ESTIMATION: Primary data collected from actual facilities are considered the best available data for representing industry operations. In this study, primary data were used to model the chlorine production. All data received were carefully evaluated before compiling the production-weighted average data sets used to generate results. No uncertainty analysis was carried out due to the lack of uncertainty data or probability distributions for key parameters, which are often only available as single point estimates from the producers.

## Intended application
"Accounting, with system-external interactions" - The intended application is a purely descriptive accounting / documentation of the analysed system including existing interactions with other systems in the LCI model. These data are an update to a previously published dataset which is a generic unit process data.

## Project
Cradle-to-Gate Life Cycle Analysis of Polyvinyl Chloride (PVC) Resin. American Chemistry Council (ACC). 2021 (currently draft form)

## Review 
The data providers reviewed their data and the average. The Vinyl Institute and some ACC members are currently reviewing the associated report. Internal review of data entry proofreading, mass balance verification and data documentation was also carried out.

## Sources
- Cradle-to-Gate Life Cycle Analysis of Polyvinyl Chloride (PVC) Resin. American Chemistry Council (ACC). 2021 (currently draft form)
