# Methylene diphenyl diisocyanate, MDI; at plant, mass and elemental alloc

Dataset: openLCA process, unit process
Category: 31-33: Manufacturing/3252: Resin, Synthetic Rubber, and Artificial and Synthetic Fibers and Filaments Manufacturing
Geography: Northern America
Time period: 2015-01-01 to 2017-12-31
Allocation method: causal allocation
Data quality: US EPA - Process Pedigree Matrix (4;1)
Generated by: Franklin Associates, A Division of ERG
Owner: American Chemistry Council
Published in: American Chemistry Council, 2022, MDI
isCopyrightProtected: false
restrictionsDescription: These U.S. LCI Database Project data ("Data") are provided by the National Renewable Energy Laboratory ("NREL"), operated by the Alliance for Sustainable Energy, LLC ("Alliance") for the US Department of Energy ("DOE") under Contract No. DE-AC36-08GO28308. The United States Government (the "Government") retains and the user acknowledges that the Government retains a non-exclusive, paid-up, irrevocable, worldwide license to publish or reproduce the published form of these data, or allow others to do so, for Government purposes.
Access to and use of these Data shall impose the following obligations on the user, as set forth in this Agreement. The user is granted the right, without any fee or cost, to use, copy, modify, alter, enhance and distribute these Data for any purpose whatsoever, provided that this entire notice appears in all copies of the Data. Any modification, alteration or enhancement of these data shall be identified and documented by the user. Further, the user agrees to credit the DOE/NREL/Alliance in any publication that results from the use of these Data. The names DOE/NREL/Alliance, however, may not be used in any advertising or publicity to endorse or promote any products or commercial entities unless specific written permission is obtained from DOE/NREL/Alliance. The user also understands that DOE/NREL/Alliance is not obligated to provide the user with any support, consulting, training or assistance of any kind with regard to the use of these Data or to provide the user with any updates, revisions or new versions of these Data.
YOU AGREE TO INDEMNIFY THE GOVERNMENT AND DOE/NREL/ALLIANCE, AND ITS SUBSIDIARIES, AFFILIATES, OFFICERS, AGENTS, AND EMPLOYEES AGAINST ANY CLAIM OR DEMAND, INCLUDING REASONABLE ATTORNEYS' FEES, RELATED TO YOUR USE OF THESE DATA. THESE DATA ARE PROVIDED BY DOE/NREL/ALLIANCE "AS IS" AND ANY EXPRESS OR IMPLIED WARRANTIES, INCLUDING BUT NOT LIMITED TO, THE IMPLIED WARRANTIES OF MERCHANTABILITY AND FITNESS FOR A PARTICULAR PURPOSE ARE DISCLAIMED. IN NO EVENT SHALL THE GOVERNMENT OR DOE/NREL/ALLIANCE BE LIABLE FOR ANY SPECIAL, INDIRECT OR CONSEQUENTIAL DAMAGES OR ANY DAMAGES WHATSOEVER, INCLUDING BUT NOT LIMITED TO CLAIMS ASSOCIATED WITH THE LOSS OF DATA OR PROFITS, WHICH MAY RESULT FROM AN ACTION IN CONTRACT, NEGLIGENCE OR OTHER TORTIOUS CLAIM THAT ARISES OUT OF OR IN CONNECTION WITH THE ACCESS, USE OR PERFORMANCE OF THESE DATA.

## General comment
The functional unit for this model is one kilogram of methylene diphenylene isocyanate (MDI). Phosgene, an incoming material in MDI production, is produced at the same plant as MDI, thus the collected LCI data could not be separated. Therefore, phosgene production is included in this dataset. The technical scope of this study is gate-to-gate and the system boundary includes incoming transport, manufacturing, and disposal of process wastes. MDI formation consists of two steps. In the first, 4,4-methylenedianiline (MDA) is created as an intermediate by the condensation of aniline and formaldehyde in the presence of an acid. In the final step, MDA is phosgenated to produce MDI. A mixture of MDI, its dimer and trimer is formed, and referred to as polymeric MDI (PMDI). Pure MDI is distilled from the reaction mixture. Hydrochloric acid is created as a coproduct during this process.

A hybrid, mass and elemental, allocation is used to allocate all inputs and outputs. Under this allocation method the chlorine input is fully allocated to the production of HCl, the inputs used to create MDA and phosgene only are allocated fully to MDI, chlorine and chlorine based atmospheric emissions or waterborne releases are fully allocated to the HCl, and all other inputs/outputs have been given mass allocation.

## Technology
The overall production technology is similar among all MDI plants that submitted data for this analysis. Methylene diphenyl diisocyanate is manufactured by first producing intermediate products; diamines (MDA) and phosgene. Diamines are produced from aniline and formaldehyde reactions and phosgene is produced from carbon monoxide and chlorine gases. The intermediate products are then reacted to form a mixture of several MDI isomers. Purification of crude MDI is the final step in MDI manufacture.

## Geography
This unit process is representative of average MDI production in North America. All MDI data collected were from 4 plants in the United States and incoming materials were modeled using North American databases such as the U.S. LCI database, ecoinvent (adapted to US conditions), and Franklin Associates’ private database. Production data were aggregated and horizontally averaged across the four North American plants. The MDI producers who provided data for this module verified that the characteristics of their plants are representative of a majority of North American MDI production. The captured MDI production amount is approximately 90 percent of the MDI production in the U.S. in 2015.

## Time period
Primary data for this unit process were collected for the years 2015 or 2017. For the MDI primary data, companies were requested to provide data for the year 2015, the most recent full year of MDI production prior to the project initiation date. Companies providing data were given the option to collect data from the year preceding or following 2015 if either year would reflect more typical production conditions. Three companies provided data for the year 2015, and one company provided data for the year 2017. After reviewing individual company data in comparison to the average, each manufacturer verified data from 2015-2017 was representative of an average year for MDI production at their company.

## Reference product
- Methylene diphenyl diisocyanate, MDI, resin, at plant [RNA]: 1 kg

## Inputs from technosphere
- Hydrochloric acid, HCl, co-product MDI; at plant: 0.035 kg
- Nitrogen, liquid, at plant: 0.037 kg
  Ecoinvent data, unavailable in US LCI database
- Transport, train, diesel powered [RNA]: 0.024 t*km
- Electricity, AC, 2300-7650 V: 0.6336 MJ; provider Electricity; at grid; consumption mix - US - US
- Transport, pipeline, natural gas [RNA]: 0.0017 t*km
- Carbon monoxide, at plant [RNA]: 0.226 kg
- Sodium hydroxide; chlor-alkali average, membrane cell; at plant; 50% solution state: 0.046 kg
- Aniline, at plant [RNA]: 0.816 kg
- Natural gas, combusted in industrial boiler [RNA]: 0.053 m3
- Hydrogen combustion, energy: 0.1702 MJ
  Hydrogen is produced in the process and combusted for energy.
- Formaldehyde; at plant; 50% solution state: 0.317 kg
  Confidential data
- Transport, barge, average fuel mix [RNA]: 0.03 t*km
- Electricity, at cogen, for natural gas turbine [US]: 0.065 kWh
  Electricity from cogeneration

## Inputs from nature
- Water [resource, water]: 0.00233 m3

## Waste to treatment
- Disposal, hazardous waste, to unspecified hazardous waste landfill: 0.00016 kg
- Disposal, hazardous waste, to incineration without energy recovery: 0.00011 kg
- Disposal, solid waste, process, to sanitary landfill: 4.2e-5 kg

## Emissions to nature
- Copper [emission, water]: 1e-9 kg
  This data was reported by fewer than three companies. To indicate known emissions while protecting the confidentiality of individual company responses, the emission is reported only by order of magnitude.
- Carbon monoxide [emission, air]: 6.3e-5 kg
- Ammonia [emission, water]: 1e-7 kg
  (same comment as for Copper)
- Chlorobenzene [emission, air]: 1e-7 kg
  (same comment as for Copper)
- 4,4'-Methylenedi(phenyl isocyanate) [emission, air]: 1e-10 kg
  (same comment as for Copper)
- Biological Oxygen Demand [emission, water]: 1e-6 kg
  (same comment as for Copper)
- Chlorobenzene [emission, water]: 1e-8 kg
  (same comment as for Copper)
- Particulate matter, > 2.5μm and ≤ 10μm [emission, air]: 1.1e-5 kg
- Particulate matter, ≤ 2.5μm [emission, air]: 3.7e-6 kg
- Mercury [emission, air]: 1e-9 kg
  (same comment as for Copper)
- Lead [emission, air]: 1e-10 kg
  (same comment as for Copper)
- Aniline [emission, air]: 1e-7 kg
  (same comment as for Copper)
- Aniline [emission, water]: 1e-7 kg
  (same comment as for Copper)
- Propylene [emission, air]: 1e-7 kg
  (same comment as for Copper)
- Organic compounds [emission, air]: 1e-5 kg
  (same comment as for Copper)
- Phenyl isocyanate [emission, air]: 1e-11 kg
  (same comment as for Copper)
- Chemical Oxygen Demand [emission, water]: 1e-5 kg
  (same comment as for Copper)
- 4,4'-Methylenedianiline [emission, water]: 1e-8 kg
  (same comment as for Copper)
- Methanol [emission, air]: 1e-6 kg
  (same comment as for Copper)
- Sulfur oxides [emission, air]: 1e-7 kg
  (same comment as for Copper)
- Carbon dioxide [emission, air]: 0.031 kg
- Total Organic Carbon [emission, water]: 1e-5 kg
  (same comment as for Copper)
- Suspended solids, inorganic [emission, water]: 1e-6 kg
  (same comment as for Copper)
- Aldehydes, unspecified [emission, air]: 1e-6 kg
  (same comment as for Copper)
- Ammonia [emission, air]: 1.28e-6 kg
- Phosgene [emission, air]: 1e-8 kg
  (same comment as for Copper)
- Chlorofluorocarbons [emission, air]: 1e-10 kg
  (same comment as for Copper)
- Nitrous oxide [emission, air]: 1e-8 kg
  (same comment as for Copper)
- 4,4'-Methylenedianiline [emission, air]: 1e-10 kg
  (same comment as for Copper)
- Methanol [emission, water]: 1e-7 kg
  (same comment as for Copper)
- Nitrogen oxides [emission, air]: 1e-5 kg
  (same comment as for Copper)
- Nickel [emission, water]: 1e-9 kg
  (same comment as for Copper)
- HFC-134a [emission, air]: 1e-11 kg
  (same comment as for Copper)
- Hexachlorobenzene [emission, air]: 1e-12 kg
  (same comment as for Copper)
- Phenols [emission, water]: 1e-7 kg
  (same comment as for Copper)
- Methane [emission, air]: 1e-6 kg
  (same comment as for Copper)
- Volatile organic compounds [emission, air]: 1.1e-6 kg

## Inventory method
Attributional and gate to gate process with hybrid mass and elemental alocation. Developed with the intention to be compatible with TRACI.

## Modelling constants
Primary data were used to model the production of MDI. All data received were carefully evaluated before compiling the production-weighted average data sets used to generate results. Secondary supporting background data were drawn from credible, widely used databases including the US LCI database, GREET, and Ecoinvent.

## Completeness
Treatment of Missing Environmental Data: Elementary and technosphere flows are cut-off at less than 1% based on environmental relevance.

Treatment of Missing Technosphere Data: Miscellaneous materials and additives, capital equipment, facilities and infrastructure, space conditioning, and support personnel requirements not included in this unit process. No gaps have been identified in this dataset.

Mass Balance: The mass balance for each individual plant was calculated.

## Data selection
All MDI production data was sourced from primary producers. Data evaluation procedures and criteria were applied consistently to all primary data provided by the participating producers for all data collected. All primary data obtained specifically for this study were considered the most representative available for the systems studied. Data were reviewed for completeness and material balances, and follow-up was conducted as needed to resolve any questions about the input and output flows, process technology, etc. The aggregated averaged datasets were also reviewed by the providing companies as compared to the provided dataset. Companies were requested to review whether their data were complete and to comment about their or the average dataset as needed.

## Data treatment
A horizontal weighted average was calculated from the data collected to develop this LCA model. The average MDI datasets were reviewed and accepted respectively by each data provider.

## Data collection
All primary data were collected for the years 2015 or 2017.

## Sampling procedure
Boundary Conditions: The system boundary includes MDI manufacturing which is aggregated with phosgene and 4,4-methylenedianiline (MDA), and includes incoming transportation and upstream burdens for each material as well as process waste management. The following are excluded from the system boundary: miscellaneous materials and additives, capital equipment, facilities and infrastructure, space conditioning, and support personnel requirements.

Data Collection: Data were collected from MDI manufacturers.

Uncertainty Estimation: Uncertainty was not calculated.

## Intended application
Situation C1 - Accounting, with system-external interactions - The intended application is a purely descriptive accounting / documentation of the analysed system including existing interactions with other systems in the LCI model. These data are an update to a previously published dataset which is a generic unit process model. A full inventory of environmental flows are included; thus this unit process can be used for a full range of LCIA impact categories. The target audience of this model includes LCA practitioners, industry, and the general public. For use as an average dataset accepted by the North American plastics/chemical industry. An inventory of environmental emission flows are included to the extent that the producers provided; thus this unit process can be used for a full range of LCIA impact categories. The original study results were analyzed using the TRACI LCIA factors.

## Project
This project was funded by and submitted to the American Chemistry Council. These data are an update to a previously published dataset which is a generic unit process data; Cradle-to-Gate Life Cycle Analysis of Methylene Diisocyanurate (MDI). Submitted to the American Chemistry Council (ACC). 2022.

## Review 
The data providers reviewed their data and the average. ACC members reviewed the associated final report. Internal ERG review of data entry proofreading, and data documentation was also carried out.

## Sources
- American Chemistry Council, 2022, MDI
