# Toluene diisocyanate, TDI; at plant; mass and elemental alloc

Dataset: openLCA process, unit process, infrastructure
Category: 31-33: Manufacturing/3252: Resin, Synthetic Rubber, and Artificial and Synthetic Fibers and Filaments Manufacturing
Geography: Northern America
Time period: 2003-01-01 to 2003-12-31
Allocation method: no allocation
Data quality: US EPA - Process Pedigree Matrix (4;1)
Generated by: Franklin Associates, A Division of ERG
Owner: American Chemistry Council
Published in: American Chemistry Council, 2023, TDI
isCopyrightProtected: false
restrictionsDescription: These U.S. LCI Database Project data ("Data") are provided by the National Renewable Energy Laboratory ("NREL"), operated by the Alliance for Sustainable Energy, LLC ("Alliance") for the US Department of Energy ("DOE") under Contract No. DE-AC36-08GO28308. The United States Government (the "Government") retains and the user acknowledges that the Government retains a non-exclusive, paid-up, irrevocable, worldwide license to publish or reproduce the published form of these data, or allow others to do so, for Government purposes.
Access to and use of these Data shall impose the following obligations on the user, as set forth in this Agreement. The user is granted the right, without any fee or cost, to use, copy, modify, alter, enhance and distribute these Data for any purpose whatsoever, provided that this entire notice appears in all copies of the Data. Any modification, alteration or enhancement of these data shall be identified and documented by the user. Further, the user agrees to credit the DOE/NREL/Alliance in any publication that results from the use of these Data. The names DOE/NREL/Alliance, however, may not be used in any advertising or publicity to endorse or promote any products or commercial entities unless specific written permission is obtained from DOE/NREL/Alliance. The user also understands that DOE/NREL/Alliance is not obligated to provide the user with any support, consulting, training or assistance of any kind with regard to the use of these Data or to provide the user with any updates, revisions or new versions of these Data.
YOU AGREE TO INDEMNIFY THE GOVERNMENT AND DOE/NREL/ALLIANCE, AND ITS SUBSIDIARIES, AFFILIATES, OFFICERS, AGENTS, AND EMPLOYEES AGAINST ANY CLAIM OR DEMAND, INCLUDING REASONABLE ATTORNEYS' FEES, RELATED TO YOUR USE OF THESE DATA. THESE DATA ARE PROVIDED BY DOE/NREL/ALLIANCE "AS IS" AND ANY EXPRESS OR IMPLIED WARRANTIES, INCLUDING BUT NOT LIMITED TO, THE IMPLIED WARRANTIES OF MERCHANTABILITY AND FITNESS FOR A PARTICULAR PURPOSE ARE DISCLAIMED. IN NO EVENT SHALL THE GOVERNMENT OR DOE/NREL/ALLIANCE BE LIABLE FOR ANY SPECIAL, INDIRECT OR CONSEQUENTIAL DAMAGES OR ANY DAMAGES WHATSOEVER, INCLUDING BUT NOT LIMITED TO CLAIMS ASSOCIATED WITH THE LOSS OF DATA OR PROFITS, WHICH MAY RESULT FROM AN ACTION IN CONTRACT, NEGLIGENCE OR OTHER TORTIOUS CLAIM THAT ARISES OUT OF OR IN CONNECTION WITH THE ACCESS, USE OR PERFORMANCE OF THESE DATA.

## General comment
This gate-to-gate unit process represents the production of one kilogram of Toluene diisocyanate (TDI) produced in North America. The studied system boundary includes flows associated with upstream raw material extraction and processing, incoming transport, manufacturing of TDI, and disposal of process wastes. TDI is made by phosgenation of toluene diamine (TDA). The TDI data for this module includes data for the production of dinitrotoluene (DNT), phosgene, and TDA which are incoming materials to TDI production. These incoming materials are included as one dataset due to fewer than the 3 companies providing data for the incoming material or the collected TDI data included the incoming material and could not be separated. These incoming materials are produced at the same plant as TDI, thus the collected LCI data could not be separated. Heat was exported as a coproduct for some producers. The energy amount for the exported heat was reported separately as a natural gas avoided product. A large amount of hydrochloric acid (HCl) is produced as a coproduct during TDI production. A hybrid, mass and elemental, basis was used to partition the credit between the two co-products, TDI and HCl. Under this allocation method the chlorine input is fully allocated to the production of HCl, the inputs used to create DNT, phosgene, and TDA only are allocated fully to TDI, chlorine and chlorine based atmospheric emissions or waterborne releases are fully allocated to the HCl, and all other inputs/outputs have been given mass allocation. The coproduct amount for HCl is not shown due to confidentiality issues.

## Technology
Toluene diisocyanate (TDI) is made by phosgenation of toluene diamine (TDA). The diamine mixture is dissolved in chlorobenzenes and reacted with excess phosgene to produce the TDI. After phosgenation, the mixture is stripped from the solvent and separated by distillation. The excess phosgene is recycled. Most of the TDI used in flexible polyurethane foams is a mixture of the 2,4- and 2,6- isomers. The 80:20 mixture of 2,4-TDI and 2,6-TDI is the most important commercial product, but other mixtures are available.

## Geography
This unit process is representative of average TDI production in North America. Production data were collected from 3 producers in North America aggregated using horizontal averaging. Incoming materials were modeled using North American data. The TDI producers who provided data for this module verified that the characteristics of their plants are representative of a majority of North American TDI production.

## Time period
This unit process is representative of TDI production in 2003. Data for the production TDI were provided by three leading producers (3 plants) for 2003 in North America. In 2015, there were only 2 companies manufacturing TDI in North America; therefore, it was decided that the 2003 average data would be used in this update after comparing the data to current data provided by one manufacturer. Differences in data were minor overall, with the newer data having lower energy consumption likely due to better efficiency over the 12 year variation.

## Reference product
- Toluene diisocyanate, TDI; at plant [RNA]: 1 kg

## Avoided products
- Natural gas, combusted in industrial boiler [RNA]: 0.0204 m3

## Inputs from technosphere
- Transport, combination truck, average fuel mix [RNA]: 0.0004 t*km
- Toluene, at plant [RNA]: 0.584 kg
- Transport, pipeline, unspecified petroleum products [RNA]: 0.0013 t*km
- Transport, ocean freighter, average fuel mix [RNA]: 0.014 t*km
- Chlorine; chlor-alkali average, membrane cell; at plant: 0.462 kg
- Transport, train, diesel powered [RNA]: 0.025 t*km
- Carbon monoxide, at plant [RNA]: 0.363 kg
- Electricity, AC, 2300-7650 V: 0.27072 MJ; provider Electricity; at grid; consumption mix - US - US
- Sodium hydroxide; chlor-alkali average, membrane cell; at plant; 50% solution state: 0.0268 kg
- Transport, pipeline, natural gas [RNA]: 0.00398 t*km
- Natural gas, combusted in industrial boiler [RNA]: 0.392 m3
- Nitric acid, at plant: 0.815 kg
  Cutoff flow due to confidential data
- Electricity, at cogen, for natural gas turbine [US]: 0.32 kWh

## Waste to treatment
- Disposal, hazardous waste, to unspecified hazardous waste landfill: 4.2e-5 kg
- Disposal, hazardous waste, to incineration with energy recovery: 0.034 kg
- Disposal, solid waste, process, to sanitary landfill: 0.0001 kg

## Emissions to nature
- Biological Oxygen Demand [emission, water]: 9.3e-5 kg
- Total suspended solids [emission, water]: 3.7e-5 kg
- Carbon monoxide [emission, air]: 1e-5 kg
- Toluene diisocyanate [emission, air]: 1e-7 kg
- Sodium hydroxide [emission, water]: 0.0001 kg
- Organic compounds [emission, air]: 1e-7 kg
- Phosgene [emission, air]: 1e-8 kg
- HCFC-22 [emission, air]: 1.5e-5 kg
- Lead [emission, air]: 1e-10 kg
- Chlorine [emission, air]: 2.8e-7 kg
- Copper [emission, water]: 1e-9 kg
- Mercury [emission, air]: 1e-10 kg
- Cyanide [emission, water]: 5.6e-8 kg
- o-Dichlorobenzene [emission, water]: 1e-7 kg
- Chloroform [emission, water]: 1e-9 kg
- Total Organic Carbon [emission, water]: 1e-5 kg
- Ammonia [emission, air]: 7.8e-5 kg
- Particulate matter, ≤ 2.5μm [emission, air]: 1e-6 kg
- Nickel [emission, water]: 1e-9 kg
- Total dissolved solids [emission, water]: 3.7e-5 kg
- Particulate matter, > 2.5μm and ≤ 10μm [emission, air]: 1.1e-5 kg
- Chemical Oxygen Demand [emission, water]: 0.00032 kg
- Ammonia [emission, water]: 1e-7 kg
- 2,4-Toluenediamine [emission, air]: 1e-8 kg
- Phosphorus compounds [emission, water]: 1e-6 kg
  Proxy for phosphate
- Nitrogen oxides [emission, air]: 0.00014 kg
- Nitrate compounds [emission, water]: 1e-5 kg
- Dichlorobenzene [emission, air]: 1e-6 kg
- Hydrochloric acid [emission, air]: 1e-6 kg
- Volatile organic compounds [emission, air]: 2.4e-5 kg
  Non-methane VOCs

## Inventory method
Attributional and gate to gate process. Developed with the intention to be compatible with TRACI.

## Modelling constants
Primary data were used to model the production of TDI. All data received were carefully evaluated before compiling the production-weighted average data sets used to generate results.

## Completeness
TREATMENT OF MISSING ENVIRONMENTAL DATA: Elementary and technosphere flows are cut-off at less than 1% based on environmental relevance.

TREATMENT OF MISSING TECHNOSPHERE DATA: Miscellaneous materials and additives, capital equipment, facilities and infrastructure, space conditioning, and support personnel requirements are not included in this unit process. No gaps have been identified in this dataset.

MASS BALANCE: The mass balance for each individual plant was calculated.

## Data selection
All TDI production data was sourced from primary producers. Data evaluation procedures and criteria were applied consistently to all primary data provided by the participating producers for all data collected. All primary data obtained specifically for this study were considered the most representative available for the systems studied. Data were reviewed for completeness and material balances, and follow-up was conducted as needed to resolve any questions about the input and output flows, process technology, etc. The aggregated averaged datasets were also reviewed by the providing companies as compared to the provided dataset. Companies were requested to review whether their data were complete and to comment about their or the average dataset as needed.

## Data treatment
A horizontally weighted average was calculated from the data collected to develop this LCA model. The average TDI datasets were reviewed and accepted respectively by each data provider. To indicate known emissions while protecting the confidentiality of individual company responses, some emissions are reported only by the order of magnitude of the average. A large amount of hydrochloric acid (HCl) is produced as a coproduct during TDI production. A hybrid, mass and elemental, basis was used to partition the credit between the two co-products, TDI and HCl. Under this allocation method the chlorine input is fully allocated to the production of HCl, the inputs used to create DNT, phosgene, and TDA only are allocated fully to TDI, chlorine and chlorine based atmospheric emissions or waterborne releases are fully allocated to the HCl, and all other inputs/outputs have been given mass allocation. This dataset has already been allocated thus no allocation factors are included in this model.

## Data collection
All primary data were collected for 2003.

## Sampling procedure
Data are from primary sources. The TDI producers who provided data for this module verified that the characteristics of their plants are representative of a majority of North American TDI production.

## Intended application
Situation C1 - Accounting, with system-external interactions - The intended application is a purely descriptive accounting / documentation of the analysed system including existing interactions with other systems in the LCI model. These data are an update to a previously published dataset which is a generic unit process model. A full inventory of environmental flows are included; thus this unit process can be used for a full range of LCIA impact categories. The target audience of this model includes LCA practitioners, industry, and the general public. This dataset has been accepted by the North American plastics/chemical industry and is intended for use as an industry average. An inventory of environmental emission flows are included to the extent that the producers provided; thus this unit process can be used for a full range of LCIA impact categories. The original study results were analyzed using the TRACI LCIA factors.

## Project
This project was funded by and submitted to the American Chemistry Council (ACC). These data are an update to a previously published ACC dataset.

## Review 
The data providers reviewed their data and the average. Three ACC members reviewed the associated final report. Internal ERG review of data entry proofreading, and data documentation was also carried out.

## Sources
- American Chemistry Council, 2023, TDI
