# Polyvinyl chloride, PVC, virgin resin; at plant

Dataset: openLCA process, unit process
Category: 31-33: Manufacturing/3252: Resin, Synthetic Rubber, and Artificial and Synthetic Fibers and Filaments Manufacturing
Geography: Northern America
Time period: 2014-12-30 to 2015-12-29
Allocation method: no allocation
Data quality: US EPA - Process Pedigree Matrix (4;1)
Generated by: Franklin Associates, A Division of ERG
Owner: American Chemistry Council
Published in: Cradle-to-Gate Life Cycle Analysis of Polyvinyl Chloride (PVC) Resin. American Chemistry Council (ACC). 2021 (currently draft form)
isCopyrightProtected: false
restrictionsDescription: These U.S. LCI Database Project data ("Data") are provided by the National Renewable Energy Laboratory ("NREL"), operated by the Alliance for Sustainable Energy, LLC ("Alliance") for the US Department of Energy ("DOE") under Contract No. DE-AC36-08GO28308. The United States Government (the "Government") retains and the user acknowledges that the Government retains a non-exclusive, paid-up, irrevocable, worldwide license to publish or reproduce the published form of these data, or allow others to do so, for Government purposes.
Access to and use of these Data shall impose the following obligations on the user, as set forth in this Agreement. The user is granted the right, without any fee or cost, to use, copy, modify, alter, enhance and distribute these Data for any purpose whatsoever, provided that this entire notice appears in all copies of the Data. Any modification, alteration or enhancement of these data shall be identified and documented by the user. Further, the user agrees to credit the DOE/NREL/Alliance in any publication that results from the use of these Data. The names DOE/NREL/Alliance, however, may not be used in any advertising or publicity to endorse or promote any products or commercial entities unless specific written permission is obtained from DOE/NREL/Alliance. The user also understands that DOE/NREL/Alliance is not obligated to provide the user with any support, consulting, training or assistance of any kind with regard to the use of these Data or to provide the user with any updates, revisions or new versions of these Data.
YOU AGREE TO INDEMNIFY THE GOVERNMENT AND DOE/NREL/ALLIANCE, AND ITS SUBSIDIARIES, AFFILIATES, OFFICERS, AGENTS, AND EMPLOYEES AGAINST ANY CLAIM OR DEMAND, INCLUDING REASONABLE ATTORNEYS' FEES, RELATED TO YOUR USE OF THESE DATA. THESE DATA ARE PROVIDED BY DOE/NREL/ALLIANCE "AS IS" AND ANY EXPRESS OR IMPLIED WARRANTIES, INCLUDING BUT NOT LIMITED TO, THE IMPLIED WARRANTIES OF MERCHANTABILITY AND FITNESS FOR A PARTICULAR PURPOSE ARE DISCLAIMED. IN NO EVENT SHALL THE GOVERNMENT OR DOE/NREL/ALLIANCE BE LIABLE FOR ANY SPECIAL, INDIRECT OR CONSEQUENTIAL DAMAGES OR ANY DAMAGES WHATSOEVER, INCLUDING BUT NOT LIMITED TO CLAIMS ASSOCIATED WITH THE LOSS OF DATA OR PROFITS, WHICH MAY RESULT FROM AN ACTION IN CONTRACT, NEGLIGENCE OR OTHER TORTIOUS CLAIM THAT ARISES OUT OF OR IN CONNECTION WITH THE ACCESS, USE OR PERFORMANCE OF THESE DATA.

## General comment
Includes material and energy requirements and environmental emissions for one kilogram of Polyvinyl Chloride (PVC) virgin resin production at the plant only (gate to gate). This PVC resin data represents suspension polymerization.

## Technology
All data providers used the suspension polymerization technology.

## Geography
For the PVC resin primary data, companies were requested to provide data for the year 2015, the most recent full year of PVC resin production prior to the project initiation date. All three companies provided data for the year 2015. After reviewing individual company data in comparison to the average, each manufacturer verified data from 2015 was representative of an average year for PVC resin production at their company.

The geographic scope of the analysis is the manufacture of PVC resin in North America. All PVC resin data collected were from plants in the United States and incoming materials were modeled using North American databases such as the U.S. LCI database and Franklin Associates’ private database, ecoinvent (adapted to US conditions) or secondary sources.

## Time period
All primary data were collected from 2015

## Reference product
- Polyvinyl chloride, PVC, resin; at plant [RNA]: 1 kg

## Inputs from technosphere
- Transport, train, diesel powered [RNA]: 0.33 t*km
- Electricity, AC, 2300-7650 V: 0.72 MJ; provider Electricity; at grid; consumption mix - US - US
- Natural gas, combusted in industrial boiler [RNA]: 0.063 m3
- Transport, pipeline, unspecified petroleum products [RNA]: 0.011 t*km
- Ethylene dichloride-vinyl chloride, EDC-VCM, monomer; at plant [RNA]: 0.997 kg; provider Ethylene dichloride-vinyl chloride monomer, EDC-VCM; at plant
- Electricity, at cogen, for natural gas turbine [US]: 0.2124 MJ

## Inputs from nature
- Water [resource, water]: 3.3 kg

## Waste to treatment
- Recycling, solid waste, to recycling or reuse: 0.00044 kg
- Disposal, hazardous waste, to incineration with energy recovery: 1.4e-5 kg
- Disposal, solid waste, process, to sanitary landfill: 0.00064 kg

## Emissions to nature
- Vinyl chloride [emission, air]: 2e-5 kg
- Zinc [emission, water]: 1e-8 kg
  This data was reported by fewer than three companies. To indicate known emissions while protecting the confidentiality of individual company responses, the emission is reported only by order of magnitude.
- Dioxins [emission, air]: 9.8e-15 kg
- Organic compounds [emission, air]: 1e-6 kg
  This data was reported by fewer than three companies. To indicate known emissions while protecting the confidentiality of individual company responses, the emission is reported only by order of magnitude. (Other Organics)
- Aldehydes, unspecified [emission, air]: 1e-8 kg
  (same comment as for Zinc)
- Vinyl chloride [emission, water]: 5.1e-13 kg
- Chemical Oxygen Demand [emission, water]: 1e-5 kg
  (same comment as for Zinc)
- Particulate matter, > 2.5μm and ≤ 10μm [emission, air]: 1e-5 kg
  (same comment as for Zinc)
- Hydrocarbons [emission, air]: 1e-5 kg
  (same comment as for Zinc)
- Nitrogen oxides [emission, air]: 1e-7 kg
  (same comment as for Zinc)
- Orthophosphate [emission, water]: 1e-7 kg
  This data was reported by fewer than three companies. To indicate known emissions while protecting the confidentiality of individual company responses, the emission is reported only by order of magnitude. (stated as phosphates)
- Chloroethane [emission, air]: 1e-7 kg
  (same comment as for Zinc)
- Chlorine [emission, air]: 1e-7 kg
  (same comment as for Zinc)
- Nitrate compounds [emission, water]: 1e-5 kg
  (same comment as for Zinc)
- Suspended solids, inorganic [emission, water]: 2e-5 kg
- Biological Oxygen Demand [emission, water]: 1e-6 kg
  (same comment as for Zinc)
- Oils, unspecified [emission, water]: 1e-6 kg
  (same comment as for Zinc)
- Ammonia [emission, water]: 1e-7 kg
  (same comment as for Zinc)
- Chloromethane [emission, air]: 1.3e-6 kg
- Ammonia [emission, air]: 1e-7 kg
  (same comment as for Zinc)
- Hydrofluorocarbons [emission, air]: 1e-6 kg
  This data was reported by fewer than three companies. To indicate known emissions while protecting the confidentiality of individual company responses, the emission is reported only by order of magnitude. (Hydrofluorocarbons)
- 2,3,7,8-Tetrachlorodibenzo-p-dioxin [emission, water]: 2.2e-15 kg
- Methanol [emission, air]: 1e-6 kg
  (same comment as for Zinc)
- Particulate matter [emission, air]: 1e-5 kg
  (same comment as for Zinc)
- Total Organic Carbon [emission, water]: 1e-6 kg
  (same comment as for Zinc)
- Particulate matter, ≤ 2.5μm [emission, air]: 1e-5 kg
  (same comment as for Zinc)

## Inventory method
Attributional; Compatible with TRACI

## Modelling constants
LCI data for the production of PVC resin were collected from three producers (three plants) in North America – all in the United States. All companies provided data for the year 2015. After reviewing individual company data in comparison to the average, each manufacturer verified data from 2015 was representative of an average year for PVC resin production at their company. Mass allocation was used to allocate all inputs and outputs to each product and co-products.

## Completeness
Data evaluation procedures and criteria were applied consistently to all primary data provided by the participating producers for all data collected. All primary data obtained specifically for this study were considered the most representative available for the systems studied. Data sets were reviewed for completeness and material balances, and follow-up was conducted as needed to resolve any questions about the input and output flows, process technology, etc. The aggregated averaged datasets were also reviewed by the providing companies as compared to the provided dataset. Companies were requested to review whether their data were complete and to comment about their or the average dataset.

Due to limited emission data availability, the Toxic Release Inventory (TRI) data was used in place of collected data from EDC/VCM data collectors for the following emissions: vinyl chloride, ethylene dichloride, carbon tetrachloride, 111 trichloroethane (chloroform), methyl chloride, and dioxins. The Vinyl Institute provided the amount of EDC/VCM production in 2015. The Vinyl Institute also provided estimates for the percentage of each emission coming from the EDC/VCM production versus the PVC production. Dioxin amounts were calculated as Toxic Equivalent Values (TEQ).

## Data selection
All PVC production data was sourced from primary producers.

## Data treatment
A weighted average was calculated from the data collected and used to develop the LCA model. Small amounts (less than 1 percent of total output) of off-spec resin is produced as coproducts during this process. A mass basis was used to allocate the credit for the coproduct. The average PVC datasets were reviewed and accepted respectively by each PVC data provider.

## Data collection
All primary data were collected in 2015

## Sampling procedure
BOUNDARY CONDITIONS: The unit process boundary includes the manufacturing of PVC resin at the plant, including incoming transportation for each material.

DATA COLLECTION: The primary data for the life cycle inventory of the production of PVC resin were collected from three producers (three plants) located in the United States in 2015. A weighted average was calculated from the data collected and used to develop the LCA model. For this process the data sets are based on actual plant data reported by plant personnel. Supporting background data were drawn from credible, widely used databases including the US LCI database, GREET, and Ecoinvent, as well as secondary data sources. Due to limited data availability, the Toxic Release Inventory (TRI) data was used in place of collected data from EDC/VCM data collectors for the following emissions: vinyl chloride, ethylene dichloride, carbon tetrachloride, 111 trichloroethane (chloroform), methyl chloride, and dioxins.

UNCERTAINTY ESTIMATION: Primary data collected from actual facilities are considered the best available data for representing industry operations. In this study, primary data were used to model the PVC resin production. All data received were carefully evaluated before compiling the production-weighted average data sets used to generate results. No uncertainty analysis was carried out due to the lack of uncertainty data or probability distributions for key parameters, which are often only available as single point estimates from the producers.

## Intended application
"Accounting, with system-external interactions" - The intended application is a purely descriptive accounting / documentation of the analysed system including existing interactions with other systems in the LCI model. These data are an update to a previously published dataset which is a generic unit process data.

## Project
These data are an update to a previously published dataset which is a generic unit process data.; Cradle-to-Gate Life Cycle Analysis of Polyvinyl Chloride (PVC) Resin. Submitted to the American Chemistry Council (ACC). 2021 (currently draft form)

## Review 
The data providers reviewed their data and the average. The Vinyl Institute and some ACC members are currently reviewing the associated report. Internal review of data entry proofreading, mass balance verification and data documentation was also carried out.

## Sources
- Cradle-to-Gate Life Cycle Analysis of Polyvinyl Chloride (PVC) Resin. American Chemistry Council (ACC). 2021 (currently draft form)
