# Polyol ether, for flexible foam polyurethane production, at plant

Dataset: openLCA process, unit process
Category: 31-33: Manufacturing/3252: Resin, Synthetic Rubber, and Artificial and Synthetic Fibers and Filaments Manufacturing
Geography: Northern America
Time period: 2015-01-01 to 2017-12-31
Allocation method: no allocation
Data quality: US EPA - Process Pedigree Matrix (4;1)
Generated by: Franklin Associates, A Division of ERG
Owner: American Chemistry Council
Published in: American Chemistry Council, 2022, Polyether Polyol for Flexible Foam Polyurethanes
isCopyrightProtected: false
restrictionsDescription: Situation C1 - Accounting, with system-external interactions - The intended application is a purely descriptive accounting / documentation of the analysed system including existing interactions with other systems in the LCI model. These data are an update to a previously published dataset which is a generic unit process model. A full inventory of environmental flows are included; thus this unit process can be used for a full range of LCIA impact categories. The target audience of this model includes LCA practitioners, industry, and the general public. This dataset has been accepted by the North American plastics/chemical industry and is intended for use as an industry average. An inventory of environmental emission flows are included to the extent that the producers provided; thus this unit process can be used for a full range of LCIA impact categories. The original study results were analyzed using the TRACI LCIA factors.Situation C1 - Accounting, with system-external interactions - The intended application is a purely descriptive accounting / documentation of the analysed system including existing interactions with other systems in the LCI model. These data are an update to a previously published dataset which is a generic unit process model. A full inventory of environmental flows are included; thus this unit process can be used for a full range of LCIA impact categories. The target audience of this model includes LCA practitioners, industry, and the general public. This dataset has been accepted by the North American plastics/chemical industry and is intended for use as an industry average. An inventory of environmental emission flows are included to the extent that the producers provided; thus this unit process can be used for a full range of LCIA impact categories. The original study results were analyzed using the TRACI LCIA factors.Situation C1 - Accounting, with system-external interactions - The intended application is a purely descriptive accounting / documentation of the analysed system including existing interactions with other systems in the LCI model. These data are an update to a previously published dataset which is a generic unit process model. A full inventory of environmental flows are included; thus this unit process can be used for a full range of LCIA impact categories. The target audience of this model includes LCA practitioners, industry, and the general public. This dataset has been accepted by the North American plastics/chemical industry and is intended for use as an industry average. An inventory of environmental emission flows are included to the extent that the producers provided; thus this unit process can be used for a full range of LCIA impact categories. The original study results were analyzed using the TRACI LCIA factors.Situation C1 - Accounting, with system-external interactions - The intended application is a purely descriptive accounting / documentation 
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
## General comment
This gate-to-gate unit process represents the production of one kilogram of polyether polyol for flexible foam polyurethane produced in North America. The studied system boundary includes elementary flows associated with upstream raw material extraction and processing, incoming transport, manufacturing of polyether polyol for flexible foam polyurethane, and disposal of process wastes. The four producers that provided data for this average dataset stated that standard polyether polyol for flexible foam polyurethane technology is used. The captured polyether polyol production amount included in this dataset is approximately 90 percent of the polyether polyol used for flexible foam polyurethane in the U.S. in 2015; the remaining 10 percent is manufactured by producers that did not contribute to this dataset. This unit process includes cutoff flows that represent process waste disposal and waste fuel gas which is created from other processes on-site. There are no coproducts in this unit process therefore no allocation was performed for polyether polyol for flexible foam polyurethane manufacturing.

## Technology
The technology used to manufacture polyether polyol for flexible foam polyurethanes in North America begins with the introduction of a potassium hydroxide catalyst to a polyol initiator, such as a triol. This solution is reacted with propylene oxide and ethylene oxide to form an intermediate. Water is then added to this intermediate. A solvent is introduced, which absorbs the polyol from the water/catalyst. The density difference between the aqueous & organic phases is used to separate the two phases. Finally, the polyol is purified of solvent, side products and water through distillation.

## Geography
This unit process is representative of average polyether polyol for flexible foam polyurethane production in North America. Production data were collected from 4 producers (4 plants) in the United States and aggregated using horizontal averaging. Incoming materials were modeled using North American data.

## Time period
This unit process is representative of polyether polyol for flexible foam polyurethane production from 2015 and 2017. For the primary data, companies were requested to provide data for the year 2015, the most recent full year of polyether polyol production prior to the project initiation date. Companies providing data were given the option to collect data from the year preceding or following 2015 if either year would reflect more typical production conditions. Three plants provided data for the year 2015, while another plant provided data from 2017.

## Reference product
- Polyol ether, for flexible foam polyurethane production, at plant [RNA]: 1 kg

## Inputs from technosphere
- Electricity, AC, 2300-7650 V: 0.09756 MJ; provider Electricity; at grid; consumption mix - US - US
- Electricity, at cogen, for natural gas turbine [US]: 0.0581 kWh
- Transport, combination truck, diesel powered [RNA]: 0.0052 t*km
- Fuel gas, produced onsite, at cracker, m3: 0.00348 m3
  This cutoff flow is a surrogate that represents waste heat and fuels from other processes on-site. The amount of energy coming from fuel gas is equivalent 0.027 MJ.
- Glycerine, at plant [RNA]: 0.0282 kg
- Propylene oxide, at plant [RNA]: 0.8572 kg
- Natural gas, combusted in industrial boiler [RNA]: 0.02048 m3
- Ethylene oxide, at plant [RNA]: 0.1069 kg
- Transport, pipeline, unspecified petroleum products [RNA]: 0.0008 t*km
- Transport, train, diesel powered [RNA]: 0.1615 t*km

## Inputs from nature
- Water, fresh [resource, water]: 1.388e-6 kg

## Waste to treatment
- Disposal, solid waste, process, to sanitary landfill: 0.0031 kg
- Disposal, hazardous waste, to incineration with energy recovery: 0.00048 kg
- Recycling, solid waste, to recycling or reuse: 7.90842e-6 kg

## Emissions to nature
- Total Organic Carbon [emission, water]: 1e-5 kg
  To indicate known emissions while protecting the confidentiality of individual company responses, the emission is reported only by the order of magnitude of the average.
- Potassium [emission, water]: 0.0001 kg
  (same comment as for Total Organic Carbon)
- Lead [emission, air]: 1e-11 kg
  (same comment as for Total Organic Carbon)
- Hydrocarbons [emission, air]: 1e-5 kg
  (same comment as for Total Organic Carbon)
- Biological Oxygen Demand [emission, water]: 1e-5 kg
  (same comment as for Total Organic Carbon)
- Propylene oxide [emission, air]: 1e-6 kg
  (same comment as for Total Organic Carbon)
- Ammonia [emission, air]: 1e-7 kg
  (same comment as for Total Organic Carbon)
- Chemical Oxygen Demand [emission, water]: 0.0001 kg
  (same comment as for Total Organic Carbon)
- HCFC-22 [emission, air]: 1e-8 kg
  (same comment as for Total Organic Carbon)
- Particulate matter, > 2.5μm and ≤ 10μm [emission, air]: 1e-5 kg
  (same comment as for Total Organic Carbon)
- Total dissolved solids [emission, water]: 1e-6 kg
  (same comment as for Total Organic Carbon)
- Carbon monoxide [emission, air]: 3.2e-5 kg
- Sulfur oxides [emission, air]: 8.5e-8 kg
- Nitrous oxide [emission, air]: 6.9e-8 kg
- Organic compounds [emission, air]: 1e-7 kg
  (same comment as for Total Organic Carbon)
- Carbon dioxide [emission, air]: 0.021 kg
- Methane [emission, air]: 3.4e-7 kg
- Hexane [emission, water]: 0.0001 kg
  (same comment as for Total Organic Carbon)
- Chlorine [emission, air]: 1e-8 kg
  (same comment as for Total Organic Carbon)
- Aldehydes, C5 [emission, air]: 1e-8 kg
  Proxy for unspecified aldehydes. To indicate known emissions while protecting the confidentiality of individual company responses, the emission is reported only by the order of magnitude of the average.
- Ethylene oxide [emission, air]: 1e-7 kg
  (same comment as for Total Organic Carbon)
- Particulate matter [emission, air]: 1e-6 kg
  (same comment as for Total Organic Carbon)
- Mercury [emission, air]: 1e-11 kg
  (same comment as for Total Organic Carbon)
- Particulate matter, ≤ 2.5μm [emission, air]: 3.7e-6 kg
- Nitrogen oxides [emission, air]: 1.3e-5 kg
- Total suspended solids [emission, water]: 1e-7 kg
  (same comment as for Total Organic Carbon)
- Hydrocarbons [emission, air]: 4.9e-6 kg
  Proxy for non-methane hydrocarbons

## Inventory method
Attributional and gate to gate process. Developed with the intention to be compatible with TRACI.

## Modelling constants
Primary data were used to model the production of polyether polyol for flexible foam polyurethanes. All data received were carefully evaluated before compiling the production-weighted average data sets used to generate results.

## Completeness
TREATMENT OF MISSING ENVIRONMENTAL DATA: Elementary and technosphere flows are cut-off at less than 1% based on environmental relevance.

TREATMENT OF MISSING TECHNOSPHERE DATA: Miscellaneous materials and additives, capital equipment, facilities and infrastructure, space conditioning, and support personnel requirements are not included in this unit process. No gaps have been identified in this dataset.

MASS BALANCE: The mass balance for each individual plant was calculated.

## Data selection
All polyether polyol for flexible foam polyurethanes production data was sourced from primary producers. The data collection methods for polyether polyol for flexible foam polyurethanes include information provided by direct measurement, purchasing and utility records, calculations from equipment specifications, and engineering estimates. Data evaluation procedures and criteria were applied consistently to all primary data provided by the participating producers for all data collected. All primary data obtained specifically for this study were considered the most representative available for the systems studied. Data were reviewed for completeness and material balances, and follow-up was conducted as needed to resolve any questions about the input and output flows, process technology, etc. The aggregated averaged datasets were also reviewed by the reporting companies as compared to the provided dataset. Companies were requested to review whether their data were complete and to comment about their or the average dataset as needed.

## Data treatment
A horizontal weighted average was calculated from the data collected to develop this LCA model. The average polyether polyol for flexible foam polyurethanes datasets were reviewed and accepted respectively by each data provider. To indicate known emissions while protecting the confidentiality of individual company responses, some emissions are reported only by the order of magnitude of the average.

## Data collection
All primary data were collected for the years 2015 or 2017.

## Sampling procedure
BOUNDARY CONDITIONS: The system boundary includes upstream burdens from incoming materials, incoming transportation of materials, polyether polyol for flexible foam polyurethanes manufacturing, and process waste management. The following are excluded from the system boundary: miscellaneous materials and additives, capital equipment, facilities and infrastructure, space conditioning, and support personnel requirements.

DATA COLLECTION: Data were collected from three polyether polyol for flexible foam polyurethanes manufacturers (four plants).

UNCERTAINTY ESTIMATION: Uncertainty was not calculated.

## Intended application
Situation C1 - Accounting, with system-external interactions - The intended application is a purely descriptive accounting / documentation of the analysed system including existing interactions with other systems in the LCI model. These data are an update to a previously published dataset which is a generic unit process model. A full inventory of environmental flows are included; thus this unit process can be used for a full range of LCIA impact categories. The target audience of this model includes LCA practitioners, industry, and the general public. This dataset has been accepted by the North American plastics/chemical industry and is intended for use as an industry average. An inventory of environmental emission flows are included to the extent that the producers provided; thus this unit process can be used for a full range of LCIA impact categories. The original study results were analyzed using the TRACI LCIA factors.

## Project
This project was funded by and submitted to the American Chemistry Council (ACC). These data are an update to a previously published ACC dataset.

## Review 
The data providers reviewed their data and the average. Two ACC members and one additional consultant reviewed the associated final report. Internal ERG review of data entry proofreading, and data documentation was also carried out.

## Sources
- American Chemistry Council, 2022, Polyether Polyol for Flexible Foam Polyurethanes
