# Carbon fiber, reinforced polymer; at plant

Dataset: openLCA process, unit process
Category: 31-33: Manufacturing/3252: Resin, Synthetic Rubber, and Artificial and Synthetic Fibers and Filaments Manufacturing
Geography: United States
Time period: 2019-01-01 to 2019-12-31
Allocation method: no allocation
Data quality: US EPA - Process Pedigree Matrix (4;5)
Generated by: National Renewable Energy Laboratory
Owner: National Renewable Energy Laboratory
Published in: Argonne National Laboratory, 2021
isCopyrightProtected: false
restrictionsDescription: These U.S. LCI Database Project data (""Data"") are provided by the National Renewable Energy Laboratory (""NREL""), operated by the Alliance for Sustainable Energy, LLC (""Alliance"") for the US Department of Energy (""DOE"") under Contract No. DE-AC36-08GO28308. The United States Government (the ""Government"") retains and the user acknowledges that the Government retains a non-exclusive, paid-up, irrevocable, worldwide license to publish or reproduce the published form of these data, or allow others to do so, for Government purposes.
Access to and use of these Data shall impose the following obligations on the user, as set forth in this Agreement. The user is granted the right, without any fee or cost, to use, copy, modify, alter, enhance and distribute these Data for any purpose whatsoever, provided that this entire notice appears in all copies of the Data. Any modification, alteration or enhancement of these data shall be identified and documented by the user. Further, the user agrees to credit the DOE/NREL/Alliance in any publication that results from the use of these Data. The names DOE/NREL/Alliance, however, may not be used in any advertising or publicity to endorse or promote any products or commercial entities unless specific written permission is obtained from DOE/NREL/Alliance. The user also understands that DOE/NREL/Alliance is not obligated to provide the user with any support, consulting, training or assistance of any kind with regard to the use of these Data or to provide the user with any updates, revisions or new versions of these Data.
YOU AGREE TO INDEMNIFY THE GOVERNMENT AND DOE/NREL/ALLIANCE, AND ITS SUBSIDIARIES, AFFILIATES, OFFICERS, AGENTS, AND EMPLOYEES AGAINST ANY CLAIM OR DEMAND, INCLUDING REASONABLE ATTORNEYS' FEES, RELATED TO YOUR USE OF THESE DATA. THESE DATA ARE PROVIDED BY DOE/NREL/ALLIANCE ""AS IS"" AND ANY EXPRESS OR IMPLIED WARRANTIES, INCLUDING BUT NOT LIMITED TO, THE IMPLIED WARRANTIES OF MERCHANTABILITY AND FITNESS FOR A PARTICULAR PURPOSE ARE DISCLAIMED. IN NO EVENT SHALL THE GOVERNMENT OR DOE/NREL/ALLIANCE BE LIABLE FOR ANY SPECIAL, INDIRECT OR CONSEQUENTIAL DAMAGES OR ANY DAMAGES WHATSOEVER, INCLUDING BUT NOT LIMITED TO CLAIMS ASSOCIATED WITH THE LOSS OF DATA OR PROFITS, WHICH MAY RESULT FROM AN ACTION IN CONTRACT, NEGLIGENCE OR OTHER TORTIOUS CLAIM THAT ARISES OUT OF OR IN CONNECTION WITH THE ACCESS, USE OR PERFORMANCE OF THESE DATA.

## General comment
This gate-to-gate unit process is for the production of 1 kg carbon fiber reinforced polymer. The modeled system is only representative of key material and energy inputs required to produce carbon fiber, reinforced polymer. Exchanges associated with production capital are not modeled. Production inventory data were developed using GREET 2019 and an Argonne National Laboratory Carbon Fiber pathway report.

## Technology
The inventory is representative of average technological conditions for the manufacturing of carbon fiber, reinforced polymer.

## Geography
This process is representative of average carbon fiber, reinforced polymer production under US conditions.

## Time period
The inventory is representative of average carbon fiber, reinforced polymer production in 2019.

## Reference product
- Carbon fiber, reinforced polymer, at plant: 1 kg

## Inputs from technosphere
- Natural gas, production mixture, to material use: 0.0933 m3; provider Natural gas, processed, for material use, at plant
- Carbon fiber, at plant: 0.788 kg
- Epoxy, at plant: 0.261 kg
- Residual fuel oil, at refinery [RNA]: 0.09687 l; provider Petroleum refining, at refinery
- Electricity, AC, 2300-7650 V: 1.5588 MJ; provider Electricity; at grid; consumption mix - US - US

## Inventory method
An attributional LCI method was used to develop the dataset.

## Modelling constants
This process was adapted from inventory data developed by Argonne National Laboratory.

## Completeness
TREATMENT OF MISSING ENVIRONMENTAL DATA: It is unknown whether a cutoff for elementary flows was used in the original study.

TREATMENT OF MISSING TECHNOSPHERE FLOWS:
It is unknown whether a cutoff for technosphere flows was used in the original study. Missing technosphere flows are unknown.

MASS BALANCE:
The mass imbalance for this unit process is unknown.

## Data selection
Data for the production of carbon fiber, reinforced polymer were collected and adapted from the original study by Argonne National Laboratory.

## Data treatment
Source inventory data were allocated to the production of 1 kg carbon fiber, reinforced polymer.

## Data collection
The 2021 calendar year.

## Sampling procedure
Data for the production of carbon fiber, reinforced polymer were collected and adapted from GREET 2019 and the Argonne National Laboratory report. The original study was developed as average production data for the US.

## Intended application
Situation C2 - Accounting (no external benefits): The intended application for this process is for accounting purposes as described in Goal Situation C1 from the ILCD Handbook's Detailed Guidance. LCA studies with this intended application offer "purely descriptive documentation of the system under analysis (e.g., a product, sector or country), without being interested in any potential consequences on other parts of the economy.” The studies categorized under Goal Situation C2 do NOT consider existing benefits outside the analyzed system such as recycling.

## Project
Original data collection was performed by Argonne National Laboratory and was adapted by the National Renewable Energy Laboratory.

## Sources
- Argonne National Laboratory, 2021
- Argonne National Laboratory, 2019
- Tapajyoti et al. 2021
