# Vinyl ester resin; at plant

Dataset: openLCA process, unit process
Category: 31-33: Manufacturing/3252: Resin, Synthetic Rubber, and Artificial and Synthetic Fibers and Filaments Manufacturing
Geography: United States
Time period: 2021-01-01 to 2022-10-31
Allocation method: no allocation
Data quality: US EPA - Process Pedigree Matrix (4;1)
Generated by: Franklin Associates, A Division of ERG
Owner: American Composites Manufacturers Association
Published in: American Composites Manufacturers Association, 2023
isCopyrightProtected: false
restrictionsDescription: These U.S. LCI Database Project data ("Data") are provided by the National Renewable Energy Laboratory ("NREL"), operated by the Alliance for Sustainable Energy, LLC ("Alliance") for the US Department of Energy ("DOE") under Contract No. DE-AC36-08GO28308. The United States Government (the "Government") retains and the user acknowledges that the Government retains a non-exclusive, paid-up, irrevocable, worldwide license to publish or reproduce the published form of these data, or allow others to do so, for Government purposes.
Access to and use of these Data shall impose the following obligations on the user, as set forth in this Agreement. The user is granted the right, without any fee or cost, to use, copy, modify, alter, enhance and distribute these Data for any purpose whatsoever, provided that this entire notice appears in all copies of the Data. Any modification, alteration or enhancement of these data shall be identified and documented by the user. Further, the user agrees to credit the DOE/NREL/Alliance in any publication that results from the use of these Data. The names DOE/NREL/Alliance, however, may not be used in any advertising or publicity to endorse or promote any products or commercial entities unless specific written permission is obtained from DOE/NREL/Alliance. The user also understands that DOE/NREL/Alliance is not obligated to provide the user with any support, consulting, training or assistance of any kind with regard to the use of these Data or to provide the user with any updates, revisions or new versions of these Data.
YOU AGREE TO INDEMNIFY THE GOVERNMENT AND DOE/NREL/ALLIANCE, AND ITS SUBSIDIARIES, AFFILIATES, OFFICERS, AGENTS, AND EMPLOYEES AGAINST ANY CLAIM OR DEMAND, INCLUDING REASONABLE ATTORNEYS' FEES, RELATED TO YOUR USE OF THESE DATA. THESE DATA ARE PROVIDED BY DOE/NREL/ALLIANCE "AS IS" AND ANY EXPRESS OR IMPLIED WARRANTIES, INCLUDING BUT NOT LIMITED TO, THE IMPLIED WARRANTIES OF MERCHANTABILITY AND FITNESS FOR A PARTICULAR PURPOSE ARE DISCLAIMED. IN NO EVENT SHALL THE GOVERNMENT OR DOE/NREL/ALLIANCE BE LIABLE FOR ANY SPECIAL, INDIRECT OR CONSEQUENTIAL DAMAGES OR ANY DAMAGES WHATSOEVER, INCLUDING BUT NOT LIMITED TO CLAIMS ASSOCIATED WITH THE LOSS OF DATA OR PROFITS, WHICH MAY RESULT FROM AN ACTION IN CONTRACT, NEGLIGENCE OR OTHER TORTIOUS CLAIM THAT ARISES OUT OF OR IN CONNECTION WITH THE ACCESS, USE OR PERFORMANCE OF THESE DATA.

## General comment
This gate-to-gate unit process represents the production of one kilogram of vinyl ester resin produced in the United States. The studied system boundary includes flows associated with upstream raw material extraction and processing, incoming transport, manufacturing of vinyl ester resin, and disposal of process wastes. The four producers and five facilities that provided data for this average dataset stated that standard vinyl ester technology is used. Vinyl ester resin is produced by the esterification of an epoxy resin with an unsaturated monocarboxylic acid. This unit process includes cutoff flows that represent process waste disposal, renewable electricity, silica sand, bisphenol A, and acrylic acid. There are no coproducts in this system process therefore no allocation was performed on the average values.

## Technology
Vinyl ester resin is produced by the esterification of an epoxy resin with an unsaturated monocarboxylic acid (UMA). Methacrylic acid (also referred to as methyl methacrylate acid (MMA)) is the most common monocarboxylic acid used in vinyl ester resin production. Acrylic acid may also be used to manufacture vinyl ester resin. The epoxy resin and UMA are mixed in a reactor vessel and heated to initiate the esterification reaction and produce the vinyl ester monomer. Styrene is commonly used as a diluent in vinyl ester resin production to achieve the desired viscosity of the mixture. Following this step, a catalyst is added to the mixture and initiates the polymerization reaction between the epoxy groups of the resin and the carboxylic acid groups of the unsaturated acid, resulting in the formation of ester linkages. The reaction is exothermic and releases heat, so cooling systems are often used to maintain the optimal temperature for the reaction. The final vinyl ester resin product is shipped to composite fabricators via drum, tote, or bulk tankers where it is combined with other materials, such as fibers and fillers, and processed into a finished or semi-finished part.

## Geography
This unit process is representative of average vinyl ester resin production in the United States. Production data were collected from 4 producers (5 plants) in the United States. Incoming materials were modeled using North American data.

## Time period
This unit process is representative of vinyl ester resin production from data collected in 2021 and 2022. For the primary data, companies were requested to provide data for the most recent full year of vinyl ester production prior to the project initiation date. Companies providing data were given the option to collect data from the year preceding or following 2021 if either year would reflect more typical production conditions. Four plants provided data from 2021 and one plant provided data from 2021-2022.

## Reference product
- Vinyl ester resin; at plant: 1 kg

## Inputs from technosphere
- Acrylic acid, at plant: 0.129 kg
  Proxy for methylacrylic acid
- Epoxy, at plant: 0.428 kg
- Electricity, from renewable source, unspecified: 0.007 kWh
- Silica sand, at plant: 0.005 kg
- Transport, ocean freighter, average fuel mix [RNA]: 2.96 t*km
- Styrene, at plant [RNA]: 0.364 kg
- Natural gas, combusted in industrial boiler [RNA]: 0.054 m3
- Bisphenol A, at plant: 0.079 kg
- Transport, train, diesel powered [RNA]: 0.813 t*km
- Electricity, AC, 2300-7650 V: 0.6768 MJ; provider Electricity; at grid; consumption mix - US - US
- Transport, combination truck, average fuel mix [RNA]: 0.483 t*km

## Inputs from nature
- Water [resource, water]: 0.083 l

## Waste to treatment
- Disposal, solid waste, to incineration with energy recovery: 0.00064 kg
- Disposal, hazardous waste, to incineration without energy recovery: 2e-5 kg
- Recycling, solid waste, to recycling or reuse: 0.00166 kg
- Disposal, solid waste, to incineration without energy recovery: 0.00016 kg
- Disposal, solid waste, process, to sanitary landfill: 0.00437 kg
- Disposal, hazardous waste, to incineration with energy recovery: 0.00225 kg

## Emissions to nature
- Methyl methacrylate [emission, air]: 1e-6 kg
- Particulate matter [emission, air]: 0.000165 kg
- Volatile organic compounds [emission, air]: 0.0001 kg

## Inventory method
Attributional and gate to gate process. Developed with the intention to be compatible with TRACI.

## Modelling constants
Primary data were used to model the production of vinyl ester resin. All data received were carefully evaluated before compiling the production-weighted average data sets used to generate results.

## Completeness
TREATMENT OF MISSING ENVIRONMENTAL DATA: Elementary and technosphere flows are cut-off at less than 1% based on environmental relevance. Land use and land transformation are not included in this dataset.
TREATMENT OF MISSING TECHNOSPHERE DATA: Miscellaneous materials and additives, capital equipment, facilities and infrastructure, space conditioning, and support personnel requirements are not included in this system process. No gaps have been identified in this dataset.
MASS BALANCE: The mass balance for each individual plant was calculated during review of the unit process data.

## Data selection
All vinyl ester resin production data was sourced from primary producers. The data collection methods for vinyl ester resin include information provided by direct measurement, purchasing and utility records, and engineering estimates. Data evaluation procedures and criteria were applied consistently to all primary data provided by the participating producers for all data collected. All primary data obtained specifically for this study were considered the most representative available for the systems studied. Data were reviewed for completeness and material balances, and follow-up was conducted as needed to resolve any questions about the input and output flows, process technology, etc. The aggregated averaged datasets were also reviewed by the reporting companies as compared to the provided dataset. Companies were requested to review whether their data were complete and to comment about their or the average dataset as needed.

## Data treatment
A horizontal weighted average was calculated from the data collected to develop the vinyl ester resin average used in this LCA model. The average vinyl ester resin data were reviewed and accepted respectively by each data provider.

## Data collection
BOUNDARY CONDITIONS: The system boundary includes upstream burdens from incoming materials, incoming fuel use, incoming transportation of materials, vinyl ester resin manufacturing, and process waste management. The following are excluded from the system boundary: miscellaneous materials and additives, capital equipment, facilities and infrastructure, space conditioning, and support personnel requirements.
DATA COLLECTION: Data were collected from 4 producers (5 plants).
UNCERTAINTY ESTIMATION: Uncertainty was not calculated.

## Sampling procedure
Data for the production of vinyl ester resin were provided by 4 leading producers (5 plants) in the United States.

## Intended application
Situation C1 - Accounting, with system-external interactions - The intended application is a purely descriptive accounting / documentation of the analysed system including existing interactions with other systems in the LCI model. These data are an update to a previously published dataset which is a generic unit process model. A full inventory of environmental flows are included; thus this unit process can be used for a full range of LCIA impact categories. The target audience of this model includes LCA practitioners, industry, and the general public. This dataset is intended for use as an industry average. An inventory of environmental emission flows are included to the extent that the producers provided; thus this system process can be used for a full range of LCIA impact categories. The original study results were analyzed using the TRACI LCIA factors.

## Project
This project was funded by and submitted to the American Composites Manufacturers Association (ACMA).

## Review 
The data providers reviewed their data and the average. Internal ERG review of data entry proofreading, and data documentation was also carried out.

## Sources
- American Composites Manufacturers Association, 2023
