# Pultruded product, at plant

Dataset: openLCA process, unit process
Category: 31-33: Manufacturing/3252: Resin, Synthetic Rubber, and Artificial and Synthetic Fibers and Filaments Manufacturing
Geography: Northern America
Time period: 2021-01-01 to 2022-11-01
Allocation method: no allocation
Data quality: US EPA - Process Pedigree Matrix (4;1)
Generated by: Franklin Associates, A Division of ERG
Owner: American Composites Manufacturers Association
Published in: American Composites Manufacturers Association, 2023
isCopyrightProtected: false
restrictionsDescription: These U.S. LCI Database Project data ("Data") are provided by the National Renewable Energy Laboratory ("NREL"), operated by the Alliance for Sustainable Energy, LLC ("Alliance") for the US Department of Energy ("DOE") under Contract No. DE-AC36-08GO28308. The United States Government (the "Government") retains and the user acknowledges that the Government retains a non-exclusive, paid-up, irrevocable, worldwide license to publish or reproduce the published form of these data, or allow others to do so, for Government purposes.
Access to and use of these Data shall impose the following obligations on the user, as set forth in this Agreement. The user is granted the right, without any fee or cost, to use, copy, modify, alter, enhance and distribute these Data for any purpose whatsoever, provided that this entire notice appears in all copies of the Data. Any modification, alteration or enhancement of these data shall be identified and documented by the user. Further, the user agrees to credit the DOE/NREL/Alliance in any publication that results from the use of these Data. The names DOE/NREL/Alliance, however, may not be used in any advertising or publicity to endorse or promote any products or commercial entities unless specific written permission is obtained from DOE/NREL/Alliance. The user also understands that DOE/NREL/Alliance is not obligated to provide the user with any support, consulting, training or assistance of any kind with regard to the use of these Data or to provide the user with any updates, revisions or new versions of these Data.
YOU AGREE TO INDEMNIFY THE GOVERNMENT AND DOE/NREL/ALLIANCE, AND ITS SUBSIDIARIES, AFFILIATES, OFFICERS, AGENTS, AND EMPLOYEES AGAINST ANY CLAIM OR DEMAND, INCLUDING REASONABLE ATTORNEYS' FEES, RELATED TO YOUR USE OF THESE DATA. THESE DATA ARE PROVIDED BY DOE/NREL/ALLIANCE "AS IS" AND ANY EXPRESS OR IMPLIED WARRANTIES, INCLUDING BUT NOT LIMITED TO, THE IMPLIED WARRANTIES OF MERCHANTABILITY AND FITNESS FOR A PARTICULAR PURPOSE ARE DISCLAIMED. IN NO EVENT SHALL THE GOVERNMENT OR DOE/NREL/ALLIANCE BE LIABLE FOR ANY SPECIAL, INDIRECT OR CONSEQUENTIAL DAMAGES OR ANY DAMAGES WHATSOEVER, INCLUDING BUT NOT LIMITED TO CLAIMS ASSOCIATED WITH THE LOSS OF DATA OR PROFITS, WHICH MAY RESULT FROM AN ACTION IN CONTRACT, NEGLIGENCE OR OTHER TORTIOUS CLAIM THAT ARISES OUT OF OR IN CONNECTION WITH THE ACCESS, USE OR PERFORMANCE OF THESE DATA.

## General comment
This gate-to-gate unit process represents the production of one kilogram of pultruded product manufactured in North America. The material inputs for pultrusion in this study are an average of the plants who provided data; as no one pultrusion plant would make a specific product using all of the materials shown. The studied unit process boundary includes elementary flows associated with upstream raw material extraction and processing, incoming transport, manufacturing of pultruded products, and disposal of process wastes. Four pultruding companies provided data for this average dataset. The thermoset resins included in this analysis are vinyl ester resin, unsaturated polyester, and polyurethane resin, which is shown by the precursors mixed at the pultrusion plant. A variety of glass fibers (rovings and/or mat) may be used for fiber reinforcement, while potential fillers include limestone, aluminum trihydrate and clay. Styrene is sometimes used as a diluent used to lower the viscosity of the resin system during the pultrusion process. Different catalysts and initiators were reported, but not included as they were smaller than the 1% of the output cut-off. This unit process includes cutoff flows that represent process waste disposal. Land use and land transformation are not included in this dataset. As these pultruding plants were considered as a whole, not focused on any one product; there are no coproducts in this unit process therefore no allocation was performed.

## Technology
For the pultrusion process, fibers are pulled through a liquid resin bath until the fibers are sufficiently impregnated with the resin. Fillers may be added to the mixture to improve the strength and thermal stability of the resin. The coated fibers are then formed to the desired shape and pulled through a heated die to cure the resin. The pultruded composite product exits the die as a continuous profile with the desired-cross sectional shape. As stated previously, the differences in input materials and output products may affect the amount of energy required and types of emissions that are produced during this process; however, the pultrusion technology is the same.

## Geography
This unit process is representative of average pultruded product manufacture in North America. Production data were collected from 4 pultruding companies (4 plants) in North America. Incoming materials were modeled using North American data.

## Time period
This unit process is representative of pultruded product manufactured in 2021-2022. Data for the pultrusion of products were provided by four leading pultruding companies (4 plants) for 2021-2022 in North America. For the primary data collected, each producer was requested to provide data for a one year period that best represented their average production within a 2 year window (2021 through 2022). Three of the four producers chose 2021 to represent their data, while one company chose a partial year in 2021 with the remainder in 2022.

## Reference product
- Pultruded product, at plant: 1 kg

## Inputs from technosphere
- Transport, combination truck, average fuel mix [RNA]: 1.277 t*km
- Electricity, AC, 2300-7650 V: 2.9196 MJ; provider Electricity; at grid; consumption mix - US - US
- Unsaturated polyester, UPR, resin, at plant [US]: 0.172 kg
- LPG, combusted in industrial boiler, at pulp and paper mill (EXCL.) [RNA]: 0.00433 l
- Methylene diphenyl diisocyanate, MDI, resin, at plant [RNA]: 0.019 kg; provider Methylene diphenyl diisocyanate, MDI; at plant, mass alloc
- Electricity, from renewable source, unspecified: 0.0504 kWh
- Polyol ether, for rigid foam polyurethane production, at plant [RNA]: 0.0121 kg
- Styrene, at plant [RNA]: 0.0089 kg
- Diesel, combusted in industrial boiler [RNA]: 0.00026 l
- Vinyl ester resin; at plant: 0.0459 kg
- Transport, ocean freighter, average fuel mix [RNA]: 1.082 t*km
- E-glass, at plant [US]: 0.741 kg

## Inputs from nature
- Water [resource, water]: 3.4e-7 l
- Kaolin [resource, ground, subterranean]: 0.0226 kg

## Waste to treatment
- Disposal, hazardous waste, to unspecified hazardous waste landfill: 0.00417 kg
- Disposal, solid waste, process, to sanitary landfill: 0.0579 kg
- Recycling, solid waste, to recycling or reuse: 0.0171 kg

## Emissions to nature
- Styrene [emission, air]: 0.00181 kg
- Particulate matter [emission, air]: 1e-7 kg
- Methyl methacrylate [emission, air]: 1e-6 kg
- Volatile organic compounds [emission, air]: 0.00102 kg

## Inventory method
Attributional and gate to gate process. Developed with the intention to be compatible with TRACI.

## Modelling constants
Primary data were used to model the manufacture of pultruded products. All data received were carefully evaluated before compiling the production-weighted average data sets used to generate results.

## Completeness
TREATMENT OF MISSING ENVIRONMENTAL DATA: Elementary and technosphere flows are cut-off at less than 1% based on environmental relevance. Land use and land transformation are not included in this dataset.
TREATMENT OF MISSING TECHNOSPHERE DATA: Miscellaneous materials and additives, capital equipment, facilities and infrastructure, space conditioning, and support personnel requirements are not included in this system process. No gaps have been identified in this dataset.
MASS BALANCE: The mass balance for each individual plant was calculated during review of the unit process data.

## Data selection
All pultruded product manufacturing data was sourced from primary producers. The data collection methods for pultruded products include information provided by direct measurement, purchasing and utility records, calculations from equipment specifications, and engineering estimates. Data evaluation procedures and criteria were applied consistently to all primary data provided by the participating producers for all data collected. All primary data obtained specifically for this study were considered the most representative available for the systems studied. Data were reviewed for completeness and material balances, and follow-up was conducted as needed to resolve any questions about the input and output flows, process technology, etc. The aggregated averaged datasets were also reviewed by the reporting companies as compared to the provided dataset. Companies were requested to review whether their data were complete and to comment about their or the average dataset as needed.

## Data treatment
A horizontal weighted average was calculated from the data collected to develop the pultrusion average used in this LCA model. The average pultruded product data were reviewed and accepted respectively by each data provider.

## Data collection
All primary data were collected for 2021 and 2022

## Sampling procedure
BOUNDARY CONDITIONS: The system boundary includes upstream burdens from incoming materials, incoming fuel use, incoming transportation of materials, pultruded composite manufacturing, and process waste management. The following are excluded from the unit process boundary: miscellaneous materials and additives, capital equipment, facilities and infrastructure, space conditioning, and support personnel requirements.
DATA COLLECTION: Data were collected from 4 pultruding companies (4 plants).
UNCERTAINTY ESTIMATION: Uncertainty was not calculated.

## Intended application
Situation C1 - Accounting, with system-external interactions - The intended application is a purely descriptive accounting / documentation of the analysed system including existing interactions with other systems in the LCI model. These data are an update to a previously published dataset which is a generic unit process model. A full inventory of environmental flows are included; thus this unit process can be used for a full range of LCIA impact categories. The target audience of this model includes LCA practitioners, industry, and the general public. This dataset is intended for use as an industry average. An inventory of environmental emission flows are included to the extent that the producers provided; thus this unit process can be used for a full range of LCIA impact categories. The original study results were analyzed using the TRACI LCIA factors.

## Project
This project was funded by and submitted to the American Composites Manufacturers Association (ACMA).

## Review 
The data providers reviewed their data and the average. Internal ERG review of data entry, proofreading, and data documentation was also carried out.

## Sources
- American Composites Manufacturers Association, 2023
