# Polystyrene, high impact, HIPS, resin; at plant

Dataset: openLCA process, unit process
Category: 31-33: Manufacturing/3252: Resin, Synthetic Rubber, and Artificial and Synthetic Fibers and Filaments Manufacturing
Geography: Northern America
Time period: 2015-01-01 to 2016-12-31
Allocation method: physical allocation
Data quality: US EPA - Process Pedigree Matrix (4;1)
Generated by: Franklin Associates, A Division of ERG
Owner: American Chemistry Council
Published in: American Chemistry Council, 2022, HIPS
isCopyrightProtected: false
restrictionsDescription: These U.S. LCI Database Project data ("Data") are provided by the National Renewable Energy Laboratory ("NREL"), operated by the Alliance for Sustainable Energy, LLC ("Alliance") for the US Department of Energy ("DOE") under Contract No. DE-AC36-08GO28308. The United States Government (the "Government") retains and the user acknowledges that the Government retains a non-exclusive, paid-up, irrevocable, worldwide license to publish or reproduce the published form of these data, or allow others to do so, for Government purposes.
Access to and use of these Data shall impose the following obligations on the user, as set forth in this Agreement. The user is granted the right, without any fee or cost, to use, copy, modify, alter, enhance and distribute these Data for any purpose whatsoever, provided that this entire notice appears in all copies of the Data. Any modification, alteration or enhancement of these data shall be identified and documented by the user. Further, the user agrees to credit the DOE/NREL/Alliance in any publication that results from the use of these Data. The names DOE/NREL/Alliance, however, may not be used in any advertising or publicity to endorse or promote any products or commercial entities unless specific written permission is obtained from DOE/NREL/Alliance. The user also understands that DOE/NREL/Alliance is not obligated to provide the user with any support, consulting, training or assistance of any kind with regard to the use of these Data or to provide the user with any updates, revisions or new versions of these Data.
YOU AGREE TO INDEMNIFY THE GOVERNMENT AND DOE/NREL/ALLIANCE, AND ITS SUBSIDIARIES, AFFILIATES, OFFICERS, AGENTS, AND EMPLOYEES AGAINST ANY CLAIM OR DEMAND, INCLUDING REASONABLE ATTORNEYS' FEES, RELATED TO YOUR USE OF THESE DATA. THESE DATA ARE PROVIDED BY DOE/NREL/ALLIANCE "AS IS" AND ANY EXPRESS OR IMPLIED WARRANTIES, INCLUDING BUT NOT LIMITED TO, THE IMPLIED WARRANTIES OF MERCHANTABILITY AND FITNESS FOR A PARTICULAR PURPOSE ARE DISCLAIMED. IN NO EVENT SHALL THE GOVERNMENT OR DOE/NREL/ALLIANCE BE LIABLE FOR ANY SPECIAL, INDIRECT OR CONSEQUENTIAL DAMAGES OR ANY DAMAGES WHATSOEVER, INCLUDING BUT NOT LIMITED TO CLAIMS ASSOCIATED WITH THE LOSS OF DATA OR PROFITS, WHICH MAY RESULT FROM AN ACTION IN CONTRACT, NEGLIGENCE OR OTHER TORTIOUS CLAIM THAT ARISES OUT OF OR IN CONNECTION WITH THE ACCESS, USE OR PERFORMANCE OF THESE DATA.

## General comment
The functional unit for this model is one kilogram of high impact polystyrene (HIPS). The technical scope of this study is gate-to-gate and the system boundary includes incoming transport, manufacturing, and disposal of process wastes. The technology used to manufacture HIPS in North America involves dispensing styrene in water in a reactor and polymerizing in the presence of initiators and suspending agents. The HIPS producers who provided data for this module verified that the characteristics of their plants are representative of a majority of North American HIPS production. The captured HIPS production amount is approximately 62 percent of the HIPS production in the U.S. in 2015.

## Technology
HIPS resin producers from the United States provided data from their facilities using technology ranging from average to state-of-the-art. Most of the producers use mass polymerization in continuous reactors, while others stated confidential processes with less detail provided. Mass polymerization begins with the styrene monomer being fed along with processing aids into a reactor. Other chemicals can be added, such as chain transfer agents or anti-oxidants, but these are normally below the one percent threshold for inclusion. Ethylbenzene or toluene may also be added in small amounts to control the polymerization rate. The polybutadiene is shredded and melted into a suspension with styrene monomer. In the reactor, the styrene is grafted onto the polybutadiene. The polystyrene reaction gives off heat as polystyrene solids are formed, which is used to heat the feed with the excess removed from the process. Tower reactors are then used to achieve high polystyrene conversion. Following discharge from tower reactors, the polystyrene stream is devolatilized, which separates out the polymer from the remaining monomer with solvent. This stream is recycled back into the reactor at regular intervals. The polymer is extruded into pellets for transport to fabricators.

## Geography
This unit process is representative of average HIPS production in North America. All HIPS data collected were from 5 plants in the United States and incoming materials were modeled using North American databases such as the U.S. LCI database, ecoinvent (adapted to US conditions), and Franklin Associates’ private database. The HIPS producers who provided data for this module verified that the characteristics of their plants are representative of a majority of North American HIPS production. The captured HIPS production amount is approximately 62 percent of U.S. HIPS production in 2015.

## Time period
This unit process is representative of HIPS production from 2015-2016. Companies providing data were given the option to collect data from the year preceding or following 2015 if either year would reflect more typical production conditions. After reviewing individual company data in comparison to the average, each manufacturer verified data from 2015 or 2016 was a representative year for their company for HIPS production in North America.

## Reference product
- Polystyrene, high impact, HIPS, resin, at plant [RNA]: 1 kg

## Inputs from technosphere
- Gasoline, combusted in equipment [RNA]: 5.9e-9 m3
- Styrene, at plant [RNA]: 0.92 kg
- Polybutadiene, butadiene rubber, BR, at plant [RNA]: 0.082 kg; provider Polybutadiene, butadiene rubber; at plant
- Transport, pipeline, unspecified petroleum products [RNA]: 0.0015 t*km
- Liquefied petroleum gas, combusted in industrial boiler [RNA]: 6.7e-9 m3
- Natural gas, combusted in industrial boiler [RNA]: 0.018 m3
- White mineral oil, at plant [RNA]: 0.016 kg
- Transport, train, diesel powered [RNA]: 0.14 t*km
- Transport, ocean freighter, average fuel mix [RNA]: 0.043 t*km
- Electricity, AC, 2300-7650 V: 0.504 MJ; provider Electricity; at grid; consumption mix - US - US
- Diesel, combusted in industrial equipment [RNA]: 9.5e-9 m3
- Transport, combination truck, diesel powered [RNA]: 0.1 t*km
- Transport, barge, average fuel mix [RNA]: 0.5 t*km

## Inputs from nature
- Water [resource, water, fresh water body, lake]: 0.00032 m3

## Waste to treatment
- Disposal, non-hazardous waste, to incineration: 0.00059 kg
- Disposal, hazardous waste, to incineration with energy recovery: 0.00038 kg
- Disposal, non-hazardous waste, to landfill: 0.00076 kg
- Recycling, solid waste, to recycling or reuse: 9.6e-6 kg
- Disposal, hazardous waste, to incineration: 0.00038 kg

## Emissions to nature
- Particulate matter, > 2.5μm and ≤ 10μm [emission, air]: 1e-5 kg
  This data was reported by fewer than three companies. To indicate known emissions while protecting the confidentiality of individual company responses, the emission is reported only by order of magnitude.
- Chemical Oxygen Demand [emission, water]: 1e-6 kg
  (same comment as for Particulate matter, > 2.5μm and ≤ 10μm)
- Biological Oxygen Demand [emission, water]: 1e-6 kg
  (same comment as for Particulate matter, > 2.5μm and ≤ 10μm)
- Carbon monoxide [emission, air]: 1e-5 kg
  (same comment as for Particulate matter, > 2.5μm and ≤ 10μm)
- Total Organic Carbon [emission, water]: 1e-6 kg
- Particulate matter, ≤ 2.5μm [emission, air]: 1e-5 kg
  (same comment as for Particulate matter, > 2.5μm and ≤ 10μm)
- Iron [emission, water]: 1e-9 kg
  (same comment as for Particulate matter, > 2.5μm and ≤ 10μm)
- Particulate matter [emission, air]: 4.4e-5 kg
- Carbon dioxide [emission, air]: 0.021 kg
- Oils, unspecified [emission, water]: 1e-6 kg
- Styrene [emission, air]: 2e-5 kg
- Aluminum [emission, water]: 1e-8 kg
  (same comment as for Particulate matter, > 2.5μm and ≤ 10μm)
- Sulfur oxides [emission, air]: 1e-7 kg
- Cyanide [emission, water]: 1e-9 kg
  (same comment as for Particulate matter, > 2.5μm and ≤ 10μm)
- Phosphorus compounds [emission, water]: 1e-9 kg
- Total dissolved solids [emission, water]: 1e-5 kg
- Aldehydes, unspecified [emission, air]: 1e-8 kg
  (same comment as for Particulate matter, > 2.5μm and ≤ 10μm)
- Chlorine [emission, air]: 1e-8 kg
  (same comment as for Particulate matter, > 2.5μm and ≤ 10μm)
- Ethylbenzene [emission, air]: 3.5e-6 kg
- Styrene [emission, water]: 1e-7 kg
- Cumene [emission, air]: 1e-8 kg
  (same comment as for Particulate matter, > 2.5μm and ≤ 10μm)
- Biphenyl [emission, air]: 1e-6 kg
  proxy for terphenyl
- Suspended solids, inorganic [emission, water]: 1e-6 kg
- Benzene [emission, air]: 1e-8 kg
  (same comment as for Particulate matter, > 2.5μm and ≤ 10μm)
- Zinc [emission, water]: 4.9e-6 kg
- Cumene [emission, air]: 1e-8 kg
  proxy for n-propylbenzene
- Lead [emission, water]: 1e-9 kg
  (same comment as for Particulate matter, > 2.5μm and ≤ 10μm)
- Ammonia [emission, air]: 1e-7 kg
  (same comment as for Particulate matter, > 2.5μm and ≤ 10μm)
- Phenol [emission, water]: 1e-7 kg
- Methane [emission, air]: 1.2e-7 kg
- Xylene [emission, air]: 1e-7 kg
- Nitrous oxide [emission, air]: 4.6e-6 kg
- Ethylbenzene [emission, water]: 1e-8 kg
  (same comment as for Particulate matter, > 2.5μm and ≤ 10μm)
- Nitrogen oxides [emission, air]: 1.1e-5 kg
  (same comment as for Particulate matter, > 2.5μm and ≤ 10μm)
- Chromium [emission, water]: 1e-10 kg
  (same comment as for Particulate matter, > 2.5μm and ≤ 10μm)
- Phosphorus [emission, water]: 1e-9 kg
- HCFC-22 [emission, air]: 1e-6 kg
  (same comment as for Particulate matter, > 2.5μm and ≤ 10μm)
- Nickel [emission, water]: 1e-9 kg
  (same comment as for Particulate matter, > 2.5μm and ≤ 10μm)
- Toluene [emission, water]: 1e-9 kg
- Toluene [emission, air]: 1e-6 kg

## Inventory method
Attributional and gate to gate process. Developed with the intention to be compatible with TRACI.

## Modelling constants
Primary data were used to model the production of HIPS. All data received were carefully evaluated before compiling the production-weighted average data sets used to generate results. Secondary supporting background data were drawn from credible, widely used databases including the US LCI database, GREET, and Ecoinvent.

## Completeness
Treatment of Missing Environmental Data: Elementary and technosphere flows are cut-off at less than 1% based on environmental relevance.

Treatment of Missing Technosphere Data: Miscellaneous materials and additives, capital equipment, facilities and infrastructure, space conditioning, and support personnel requirements not included in this unit process. No gaps have been identified in this dataset.

Mass Balance: The mass balance for each individual plant was calculated.

## Data selection
All HIPS production data was sourced from primary producers. Data evaluation procedures and criteria were applied consistently to all primary data provided by the participating producers for all data collected. All primary data obtained specifically for this study were considered the most representative available for the systems studied. Data were reviewed for completeness and material balances, and follow-up was conducted as needed to resolve any questions about the input and output flows, process technology, etc. The aggregated averaged datasets were also reviewed by the providing companies as compared to the provided dataset. Companies were requested to review whether their data were complete and to comment about their or the average dataset as needed.

## Data treatment
A horizontal weighted average was calculated from the data collected to develop this LCA model. The average HIPS datasets were reviewed and accepted respectively by each data provider. To indicate known emissions while protecting the confidentiality of individual company responses, some emissions are reported only by the order of magnitude of the average.

## Data collection
All primary data were collected for the years 2015 or 2016.

## Sampling procedure
Boundary Conditions: The system boundary includes HIPS manufacturing, and includes incoming transportation and upstream burdens for each material as well as process waste management. The following are excluded from the system boundary: miscellaneous materials and additives, capital equipment, facilities and infrastructure, space conditioning, and support personnel requirements.

Data Collection: Data were collected from four HIPS manufacturers.

Uncertainty Estimation: Uncertainty was not calculated.

## Intended application
Situation C1 - Accounting, with system-external interactions - The intended application is a purely descriptive accounting / documentation of the analysed system including existing interactions with other systems in the LCI model. These data are an update to a previously published dataset which is a generic unit process model. The target audience of this model includes LCA practitioners, industry, and the general public. For use as an average dataset accepted by the North American plastics/chemical industry. An inventory of environmental emission flows are included to the extent that the producers provided; thus this unit process can be used for a full range of LCIA impact categories. The original study results were analyzed using the TRACI LCIA factors.

## Project
This project was funded by and submitted to the American Chemistry Council. These data are an update to a previously published dataset which is a generic unit process data.; Cradle-to-Gate Life Cycle Analysis of High Impact Polystyrene (HIPS). Submitted to the American Chemistry Council (ACC). 2022.

## Review 
The data providers reviewed their data and the average. Three ACC members reviewed the associated final report. Internal ERG review of data entry proofreading, and data documentation was also carried out.

## Sources
- American Chemistry Council, 2022, HIPS
