# Aluminum, secondary, rolled

Dataset: openLCA process, unit process
Category: 31-33: Manufacturing/3313: Alumina and Aluminum Production and Processing
Geography: Northern America
Time period: 1997-12-31 to 1997-12-31
Allocation method: no allocation
Generated by: Franklin Associates, A Division of ERG
Published in: Franklin Associates (2005) Secondary Aluminum Production
isCopyrightProtected: false
restrictionsDescription: All information can be accessed by everybody.

## General comment
Separate unit processes are shown for automotive and UBC (used beverage container) scrap; however, it was determined that the recovery rates and processing requirements for these 2 markets are similar, and thus the results for the 2 markets are the same. Atmospheric, waterborne, and solid waste emissions represent process emissions only, not fuel combustion emissions.,
Important note: although most of the data in the US LCI database has
undergone some sort of review, the database as a whole has not yet
undergone a formal validation process.
Please email comments to lci@nrel.gov.

## Geography
North America

## Reference product
- Aluminum, secondary, rolled [RNA]: 1 kg

## Inputs from technosphere
- Filter media, at plant: 2.21e-5 kg
- Electricity, AC, 2300-7650 V: 7.884 MJ; provider Electricity; at grid; consumption mix - US - US
- Alloying additives, at plant: 0.009 kg
- Treatment gases, unspecified, at plant: 0.001 kg
- Grain refiners, at plant: 0.0001 kg
- Quicklime, at plant [RNA]: 1.08e-5 kg
- Natural gas, combusted in industrial boiler [RNA]: 0.19488 m3
- Chemicals, unspecified, used for wastewater treatment: 0.004 kg
- Aluminum, secondary, ingot, at plant [RNA]: 0.991 kg
- Lubricant feedstock, at refinery: 4.05e-7 kg
- Treatment salts, unspecified, at plant: 0.004 kg
- Packaging, unspecified, at plant: 7.6e-6 kg

## Waste to treatment
- Disposal, solid waste, unspecified, to sanitary landfill: 0.023165 kg

## Emissions to nature
- Carbon dioxide [emission, air]: 0.0283 kg
- Carbon monoxide [emission, air]: 4.26e-5 kg
- Lead [emission, air]: 9.9e-8 kg
- Acid compounds [emission, air]: 0.0005859 kg
- Total dissolved solids [emission, water]: 1.1e-8 kg
- Organic compounds [emission, water]: 4.421e-5 kg
- Suspended solids, inorganic [emission, water]: 2.46e-5 kg
- Particulate matter [emission, air]: 0.00020283 kg
- Nitrogen oxides [emission, air]: 0.0188 kg
- Biological Oxygen Demand [emission, water]: 4.4665e-7 kg
- Volatile organic compounds [emission, air]: 0.000895 kg
- Metals [emission, water]: 3.3e-5 kg
- Sulfur oxides [emission, air]: 5.72e-6 kg
- Chemical Oxygen Demand [emission, water]: 4.1e-7 kg

## Sources
- unspecified
- unspecified
- Franklin Associates (2005) Secondary Aluminum Production
- The Aluminum Association
