# Scanner, department, S3060, S3100, S3120

Dataset: openLCA process, unit process
Category: 31-33: Manufacturing/3341: Computer and Peripheral Equipment Manufacturing
Geography: China
Time period: 2019-01-30 to 2020-11-30
Allocation method: no allocation
Data quality: US EPA - Process Pedigree Matrix (2;1)
Exchange data quality scheme: US EPA - Flow Pedigree Matrix
Generated by: Roy Wood
Owner: Kodak Alaris
Published in: Kodak Alaris 2021 LCA GHG Summary Report
isCopyrightProtected: false
restrictionsDescription: Summary is available to public.
These U.S. LCI Database Project data ("Data") are provided by the National Renewable Energy Laboratory ("NREL"), operated by the Alliance for Sustainable Energy, LLC ("Alliance") for the US Department of Energy ("DOE") under Contract No. DE-AC36-08GO28308. The United States Government (the "Government") retains and the user acknowledges that the Government retains a non-exclusive, paid-up, irrevocable, worldwide license to publish or reproduce the published form of these data, or allow others to do so, for Government purposes.
Access to and use of these Data shall impose the following obligations on the user, as set forth in this Agreement. The user is granted the right, without any fee or cost, to use, copy, modify, alter, enhance and distribute these Data for any purpose whatsoever, provided that this entire notice appears in all copies of the Data. Any modification, alteration or enhancement of these data shall be identified and documented by the user. Further, the user agrees to credit the DOE/NREL/Alliance in any publication that results from the use of these Data. The names DOE/NREL/Alliance, however, may not be used in any advertising or publicity to endorse or promote any products or commercial entities unless specific written permission is obtained from DOE/NREL/Alliance. The user also understands that DOE/NREL/Alliance is not obligated to provide the user with any support, consulting, training or assistance of any kind with regard to the use of these Data or to provide the user with any updates, revisions or new versions of these Data.
YOU AGREE TO INDEMNIFY THE GOVERNMENT AND DOE/NREL/ALLIANCE, AND ITS SUBSIDIARIES, AFFILIATES, OFFICERS, AGENTS, AND EMPLOYEES AGAINST ANY CLAIM OR DEMAND, INCLUDING REASONABLE ATTORNEYS' FEES, RELATED TO YOUR USE OF THESE DATA. THESE DATA ARE PROVIDED BY DOE/NREL/ALLIANCE "AS IS" AND ANY EXPRESS OR IMPLIED WARRANTIES, INCLUDING BUT NOT LIMITED TO, THE IMPLIED WARRANTIES OF MERCHANTABILITY AND FITNESS FOR A PARTICULAR PURPOSE ARE DISCLAIMED. IN NO EVENT SHALL THE GOVERNMENT OR DOE/NREL/ALLIANCE BE LIABLE FOR ANY SPECIAL, INDIRECT OR CONSEQUENTIAL DAMAGES OR ANY DAMAGES WHATSOEVER, INCLUDING BUT NOT LIMITED TO CLAIMS ASSOCIATED WITH THE LOSS OF DATA OR PROFITS, WHICH MAY RESULT FROM AN ACTION IN CONTRACT, NEGLIGENCE OR OTHER TORTIOUS CLAIM THAT ARISES OUT OF OR IN CONNECTION WITH THE ACCESS, USE OR PERFORMANCE OF THESE DATA.

## General comment
This unit process represents the gate-to-gate production of one Kodak Alaris scanner models S3060, S3100, S3120, including power supply and cables (mass = 16.5 kg). The system boundary includes: 1) the transport of raw materials to multiple manufacturing facilities where various subcomponents are produced; 2) the manufacture of subcomponents; 3) the transport of subcomponents to a different manufacturing plant for final assembly; 4) the assembly of subcomponents into a complete scanner; and 5) the transport of generated waste from the manufacturing facilities to a municipal solid waste landfill. The following processes and life cycle phases fall outside of the system boundary: 1) packaging of the completed scanner; 2) all transport downstream of the assembly plant gate; 3) sale of product; 4) product use phase; and 5) end-of-life phase (including recycling).

The use of this unit process for the analysis of similar devices requires professional judgement based on the degree of similarity.

## Technology
The manufacture of a department level scanner that uses 2020 technology including information storage and processing and energy savings features. The manufacture includes the manufacturing of subcomponents at other facilities and assembly at a central location.

## Geography
Scanners are manufactured in China, but components represent a global supply chain and secondary data is based on best available data from global sources.

## Time period
Primary data is valid from 2019 - 2020. Secondary data is valid from 2005 - 2021.

## Reference product
- Scanner, department, S3060, S3100, S3120 [CN]: 1 Item(s)
  16.5 kg department scanner

## Inputs from technosphere
- Acrylonitrile-butadiene-styrene, ABS, copolymer resin, at plant [RNA]: 5.85 kg; triangle minimum 5.6, mode 5.85, maximum 6.1
- Transport, combination truck, average fuel mix [RNA]: 19.6 t*km; triangle minimum 12, mode 19.6, maximum 30
- Polybutadiene, butadiene rubber, BR, at plant [RNA]: 0.0557 kg; triangle minimum 0.054, mode 0.0557, maximum 0.059; provider Polybutadiene, butadiene rubber; at plant
- Urea formaldehyde, UF, resin, neat, 65% solids [RNA]: 0.0003 kg; triangle minimum 0.00025, mode 0.0003, maximum 0.00035
- Electricity, at grid [CN]: 30 kWh; triangle minimum 27.5, mode 30, maximum 32.5; provider Electricity, at grid, CN, 2018
- E-glass, at plant [US]: 0.056 kg; triangle minimum 0.052, mode 0.056, maximum 0.06
- Polyoxymethylene, POM - EU-27: 0.174 kg; triangle minimum 0.16, mode 0.174, maximum 0.19
- Metal product manufacturing, average metal working: 8.11 kg; triangle minimum 8.3, mode 8.11, maximum 7.9
- Polyethylene, low-density, LDPE, virgin resin, at plant: 0.0021 kg; triangle minimum 0.0016, mode 0.0021, maximum 0.0026
- Iron and steel, production mix [RNA]: 0.19 kg; triangle minimum 0.15, mode 0.19, maximum 0.23
- Transport, passenger, aircraft: 11.1 p*km; triangle minimum 7, mode 11.1, maximum 15
- Zinc, Special High Grade [GLO]: 0.034 kg; triangle minimum 0.03, mode 0.034, maximum 0.038
- Transport, aircraft, freight [RNA]: 3.3 t*km; triangle minimum 3, mode 3.3, maximum 3.6
- Power adapter, for laptop, at plant: 0.64 kg
- Printed wiring board, through-hole mounted, unspecified, Pb free: 0.216 kg; triangle minimum 0.23, mode 0.216, maximum 0.21
- Polypropylene, PP, virgin resin, at plant [RNA]: 0.0022 kg; triangle minimum 0.002, mode 0.0022, maximum 0.0024
- Polyvinyl chloride, PVC, resin; at plant [RNA]: 0.0018 kg; triangle minimum 0.0016, mode 0.0018, maximum 0.002; provider Polyvinyl chloride, PVC, virgin resin; at plant
- Natural gas, production mixture, at processing: 0.154753 kg; triangle minimum 0.140015, mode 0.154753, maximum 0.169492
- Nylon 6-6 - GLO: 0.0925 kg; triangle minimum 0.091, mode 0.0925, maximum 0.094
- Aluminum ingot, production mix, at plant [US]: 0.118 kg; triangle minimum 0.11, mode 0.0118, maximum 0.013
- Polycarbonate: 0.796 kg; triangle minimum 0.78, mode 0.796, maximum 0.81
- Steel; cold rolled coil, at plant: 7.76 kg; triangle minimum 7.5, mode 7.76, maximum 8
- Lubricant feedstock, at refinery: 0.002 kg; triangle minimum 0.0019, mode 0.002, maximum 0.0021
- Gasoline, at refinery: 0.0026 m3; triangle minimum 0.002, mode 0.0026, maximum 0.0032; provider Petroleum refining, at refinery
- Transport, pipeline, natural gas [RNA]: 0.2 t*km; triangle minimum 0.1, mode 0.2, maximum 0.4
- Polyethylene terephthalate, PET, virgin resin, at plant, kg: 0.019 kg; triangle minimum 0.017, mode 0.019, maximum 0.021
- Cable, connector for computer, without plugs, at plant: 0.92 kg; triangle minimum 0.9, mode 0.92, maximum 0.94
- Polyethylene, low-density, LDPE, virgin resin, at plant: 0.0021 kg; triangle minimum 0.0019, mode 0.0021, maximum 0.0023
- Paper, freesheet, coated, average production, at mill [RNA]: 0.0016 kg; triangle minimum 0.0015, mode 0.0016, maximum 0.0017
- Injection molding, rigid polypropylene part, at plant [RNA]: 7.01 kg; triangle minimum 6.82, mode 7.01, maximum 7.2

## Inputs from nature
- Water [resource, water]: 82 kg; triangle minimum 70, mode 82, maximum 95
  Process water

## Inventory method
Attributional.

## Modelling constants
Allocation rules: Materials were based on actual specifications. Energy and fuels were allocated to products manufactured at the location based on their mass.
Substitution allocation: Substitution by close proxy ( data for similar processes were used for the components)

## Completeness
TREATMENT OF MISSING Environmental Data - all known elementary flows are included, so cutoff is <1%
Technosphere flow data - Intermediate flows are cut-off at less than 1% (physical criteria). Capital equipment used for manufacturing are not included.

MASS BALANCE - The mass of inputs (not including fuels) balances with the scanner output, so there is less than 1% difference.

## Data selection
An attempt was made to include data for all inputs. Primary data was used where available and the most representative secondary data was used where primary data was not available.

## Data treatment
Primary data were taken from precise engineering specifications specific to this unit process. These data were then transformed into material and energy flows using the methodology described in Wood (2019) which is due to be released in August, 2019. The Wood (2019) methodology is almost identical to the methodology described in Wood (2012) which is an ISO 14044 compliant, peer-reviewed life cycle assessment report of three Kodak scanners (Kodak i2800; i2600; and i2400).

Secondary data were taken from the ecoinvent 3.2 database (Wernet et al. 2016) and the U.S. Life Cycle Inventory Database (National Renewable Energy Laboratory 2016). The data were global except where otherwise specified.

## Data collection
All primary data were collected from 2018 to 2019. Secondary data were collected from 2005-2019 (National Renewable Energy Laboratory 2016; Wernet et al. 2016).

## Sampling procedure
BOUNDARY CONDITIONS
The system boundary includes: 1) the transport of raw materials to multiple manufacturing facilities where various subcomponents are produced; 2) the manufacture of subcomponents; 3) the transport of subcomponents to a different manufacturing plant for final assembly; 4) the assembly of subcomponents into a complete scanner; and 5) the transport of generated waste from the manufacturing facilities to a municipal solid waste landfill. The following processes and life cycle phases fall outside of the system boundary: 1) packaging of the completed scanner; 2) all transport downstream of the assembly plant gate; 3) sale of product; 4) product use phase; and 5) end-of-life phase (including recycling).

DATA COLLECTION
For material inputs, data collection was based on scanner specifications provided by the manufacturer. Other inputs (e.g. energy; waste transport and disposal) were calculated on the basis of quantity of input per kg of scanner produced.

UNCERTAINTY ESTIMATION
Uncertainty was estimated based on engineering judgment. Material inputs had less uncertainty because they were based off of precise engineering specifications. Other inputs (e.g. energy; waste transport and disposal) had more uncertainty.

## Intended application
The intended application for this unit process is for "Accounting" purposes as described in Situation C2 from the Institute for Environment and Sustainablility (2011:3). As such, it describes the gate-to-gate production of one S3060, S3100, or S3120 desktop scanner "without being interested in any potential consequences on other parts of the economy" (Institute for Environment and Sustainablility 2011:3) and without consideration of potential benefits from recycling the scanner at the end of its useful life.

## Project
Data and LCA results are reported in Wood (2021) Life Cycle Greenhouse Gas Assessment Summary Report -
Kodak Alaris models S3060, S3100, and S3120 Scanners - ISO 14044 Protocol

## Review 
The Wood (2021) methodology is almost identical to the methodology described in Wood (2012) which is an ISO 14044 compliant, peer-reviewed LCA report of three Kodak scanners (Kodak i2800; i2600; and i2400), which was peer reviewed by Kate Wennebeck of Rochester Institute of Technology's Pollution Prevention Institute.

## Sources
- Wernet et al. (2016) The ecoinvent database version 3 (part I): overview and methodology.
