# Solid oxide electrolysis cell; at plant

Dataset: openLCA process, unit process, infrastructure
Category: 31-33: Manufacturing/3359: Other Electrical Equipment and Component Manufacturing
Geography: United States
Time period: 2015-01-01 to 2022-12-31
Allocation method: no allocation
Data quality: US EPA - Process Pedigree Matrix (4;5)
Generated by: National Renewable Energy Laboratory
Owner: National Renewable Energy Laboratory
Published in: Schreiber, A
isCopyrightProtected: false
restrictionsDescription: These U.S. LCI Database Project data ("Data") are provided by the National Renewable Energy Laboratory ("NREL"), operated by the Alliance for Sustainable Energy, LLC ("Alliance") for the US Department of Energy ("DOE") under Contract No. DE-AC36-08GO28308. The United States Government (the "Government") retains and the user acknowledges that the Government retains a non-exclusive, paid-up, irrevocable, worldwide license to publish or reproduce the published form of these data, or allow others to do so, for Government purposes.
Access to and use of these Data shall impose the following obligations on the user, as set forth in this Agreement. The user is granted the right, without any fee or cost, to use, copy, modify, alter, enhance and distribute these Data for any purpose whatsoever, provided that this entire notice appears in all copies of the Data. Any modification, alteration or enhancement of these data shall be identified and documented by the user. Further, the user agrees to credit the DOE/NREL/Alliance in any publication that results from the use of these Data. The names DOE/NREL/Alliance, however, may not be used in any advertising or publicity to endorse or promote any products or commercial entities unless specific written permission is obtained from DOE/NREL/Alliance. The user also understands that DOE/NREL/Alliance is not obligated to provide the user with any support, consulting, training or assistance of any kind with regard to the use of these Data or to provide the user with any updates, revisions or new versions of these Data.
YOU AGREE TO INDEMNIFY THE GOVERNMENT AND DOE/NREL/ALLIANCE, AND ITS SUBSIDIARIES, AFFILIATES, OFFICERS, AGENTS, AND EMPLOYEES AGAINST ANY CLAIM OR DEMAND, INCLUDING REASONABLE ATTORNEYS' FEES, RELATED TO YOUR USE OF THESE DATA. THESE DATA ARE PROVIDED BY DOE/NREL/ALLIANCE "AS IS" AND ANY EXPRESS OR IMPLIED WARRANTIES, INCLUDING BUT NOT LIMITED TO, THE IMPLIED WARRANTIES OF MERCHANTABILITY AND FITNESS FOR A PARTICULAR PURPOSE ARE DISCLAIMED. IN NO EVENT SHALL THE GOVERNMENT OR DOE/NREL/ALLIANCE BE LIABLE FOR ANY SPECIAL, INDIRECT OR CONSEQUENTIAL DAMAGES OR ANY DAMAGES WHATSOEVER, INCLUDING BUT NOT LIMITED TO CLAIMS ASSOCIATED WITH THE LOSS OF DATA OR PROFITS, WHICH MAY RESULT FROM AN ACTION IN CONTRACT, NEGLIGENCE OR OTHER TORTIOUS CLAIM THAT ARISES OUT OF OR IN CONNECTION WITH THE ACCESS, USE OR PERFORMANCE OF THESE DATA.

## General comment
This cradle to gate process is for 1 solid oxide electrolysis cell for use in solid oxide electrolysis hydrogen production. This model is based on European primary data but has been adapted to represent US conditions. Data were collected by Schreiber et al., 2020 from process designs and simulations and have been adapted by the National Renewable Energy Laboratory (NREL). The system boundary of this dataset includes the production process and incoming materials with transportation.

## Technology
This process represents the production of a single electrolysis cell. Incoming materials, transport, and process energy required for sintering are included.

## Geography
This process is representative of the production of an electrolysis cell under US conditions. This study was originally conducted under European conditions but this dataset has been adapted to represent US conditions.

## Time period
This unit process is representative of data collected from a study that was published in 2020. The data is based on various studies. This dataset has been adapted recently to reflect US conditions and to allocate flows as needed.

## Reference product
- Solid oxide electrolysis cell; at plant: 1 Item(s)

## Inputs from technosphere
- Copper oxide, at plant: 0.000143 kg
- Benzyl alcohol, at plant: 0.00301 kg
- Electricity, AC, 2300-7650 V: 0.432 MJ; provider Electricity; at grid; consumption mix - US - US
  Surrogate for "market group for electricity, low voltage"
- Transport, train, diesel powered [RNA]: 0.014 t*km
- Manganese dioxide, at plant: 0.000351 kg
- Methyl ethyl ketone, at plant: 0.00762 kg
- Nitric acid, 98%, at plant: 0.00873 kg
- Transport, ocean freighter, average fuel mix [RNA]: 0.401 t*km
- Transport, combination truck, average fuel mix [RNA]: 0.0069 t*km
- Zirconium oxide, at market: 0.0149 kg
- Carboxymethyl cellulose powder, at plant: 0.00301 kg
- Ethanol, 85%, blended, at service station [RNA]: 0.00762 kg; provider Ethanol, 85%, blended, at service station, 2022
  Surrogate for "market for ethanol, without water, in 99.7% solution state, from ethylene"

## Inputs from nature
- Iron [resource, ground]: 0.000389 kg
  Surrogate for "Iron(III) oxide-hydroxide FeO(OH)"
- Nickel [resource, ground, subterranean]: 0.0179 kg
- Yttrium [resource, ground, subterranean]: 0.00242 kg
  Surrogate for yttrium oxide
- Cerium [resource, ground, subterranean]: 0.000201 kg
  Surrogate for cerium oxide
- Lanthanum [resource, ground, subterranean]: 0.00198 kg
  Surrogate for lanthanum oxide
- Cobalt [resource, ground]: 0.000394 kg
  Surrogate for cobalt hydroxide
- Strontium [resource, ground, subterranean]: 0.000324 kg
  Surrogate for strontium carbonate
- Gadolinium [resource, ground, subterranean]: 5.3e-5 kg
  Surrogate for gadolinium oxide

## Waste to treatment
- Disposal, inert solid waste, to inert material landfill: 0.0386 kg

## Emissions to nature
- Nitrogen oxides [emission, air]: 0.00032 kg
  Released through stacks
- Volatile organic compounds [emission, air]: 0.00638 kg
  Non-methane VOCs. Released through stacks

## Inventory method
An attributional LCI method was used to develop the dataset.

## Modelling constants
This process was adapted from Schreiber et al., 2020.

## Completeness
TREATMENT OF MISSING ENVIRONMENTAL DATA: It is unknown whether a cutoff for elementary flows was used in the original study.

TREATMENT OF MISSING TECHNOSPHERE FLOWS: It is unknown whether a cutoff for elementary flows was used in the original study. Missing technosphere flows are unknown.

MASS BALANCE: The mass imbalance for this unit process is unknown.

## Data selection
Data for the production of hydrogen from solidoxide electrolysis cell was collected and adapted from the original study, Schreiber et al., 2020. The data in the original study was collected from various studies. Surrogates were used as needed.

## Data treatment
The original model used European incoming datasets, which have been switched to US based incoming datasets in this model. Flows have been adapted and emissions have been estimated for this dataset. It is assumed that 30% of the organic chemicals and solvents are emitted as NMVOC and 5% of the nitric acid is emitted as nitrogen oxides.

## Data collection
Data were collected from Schreiber et al., 2020. The data for this model was obtained from various sources.

## Sampling procedure
BOUNDARY CONDITIONS: The system boundary includes upstream burdens from incoming materials and process energy.

DATA COLLECTION: Data were collected from Schreiber et al., 2020.

UNCERTAINTY ESTIMATION: It is unknown whether an uncertainty estimation was performed.

## Intended application
The intended application for this process is for accounting purposes as described in Goal Situation C1 from the ILCD Handbook's Detailed Guidance. LCA studies with this intended application offer "purely descriptive documentation of the system under analysis (e.g., a product, sector or country), without being interested in any potential consequences on other parts of the economy.” The studies categorized under Goal Situation C1 do NOT consider existing benefits outside the analyzed system such as recycling. The target audience of this dataset is LCA practitioners, industry, the general public, and policymakers. This model was originally built for an LCA and was originally developed and analyzed with the ReCiPe and CML2001 impact assessment methods. The completeness of elementary flows is unknown and it is not an update to a previous USLCI dataset.

## Project
This project was funded by NREL.

## Sources
- Schreiber, A
