# Solid oxide electrolysis stack; 150 kW, at plant

Dataset: openLCA process, unit process
Category: 31-33: Manufacturing/3359: Other Electrical Equipment and Component Manufacturing
Geography: United States
Time period: 2015-01-01 to 2022-12-31
Allocation method: no allocation
Data quality: US EPA - Process Pedigree Matrix (4;5)
Generated by: National Renewable Energy Laboratory
Owner: National Renewable Energy Laboratory
Published in: Schreiber, A
isCopyrightProtected: false
restrictionsDescription: The intended application for this process is for accounting purposes as described in Goal Situation C1 from the ILCD Handbook's Detailed Guidance. LCA studies with this intended application offer "purely descriptive documentation of the system under analysis (e.g., a product, sector or country), without being interested in any potential consequences on other parts of the economy.” The studies categorized under Goal Situation C1 do NOT consider existing benefits outside the analyzed system such as recycling. The target audience of this dataset is LCA practitioners, industry, the general public, and policymakers. This model was originally built for an LCA and was originally developed and analyzed with the ReCiPe and CML2001 impact assessment methods. The completeness of elementary flows is unknown and it is not an update to a previous USLCI dataset.

## General comment
This cradle to gate unit process is for the assembly of a 150 kilowatt (kW) solid oxide electrolysis stack. The original model was based on European data but has been adapted to represent US conditions. Data were originally collected by Schreiber et al., 2020 and have been adapted by the National Renewable Energy Laboratory (NREL). The system boundary of this dataset includes the main incoming materials with transportation but excludes the argon and hydrogen incoming materials that are needed for annealing due to missing data.

## Technology
This process represents the production of one solid oxide electrolysis stack. Incoming materials, transport, and process energy required for assembly are included.

## Geography
This process is representative of the production of a solid oxide electrolysis stack under US conditions. This study was originally conducted under European conditions but this dataset has been adapted to represent US conditions.

## Time period
This unit process is representative of data collected from a study that was published in 2020. This dataset has been adapted recently to reflect US conditions and to allocate flows as needed.

## Reference product
- Solid oxide electrolysis stack; 150 kW, at plant: 1 Item(s)

## Inputs from technosphere
- Electricity, AC, 2300-7650 V: 13001.4 MJ; provider Electricity; at grid; consumption mix - US - US
  Surrogate for "market group for electricity, low voltage"
- Glass cermet; at plant: 19.9 kg
- Transformation, to industrial area: 0.105 m2
- Building construction, hall, steel construction: 0.029 m3
- Building construction, multi-storey: 0.175 m3
- Cast iron: 414 kg
- Transport, combination truck, average fuel mix [RNA]: 55.6 t*km
- Steel, stainless 304, flat rolled coil [RNA]: 534 kg
- Natural gas, combusted in industrial equipment, 1.357 m3/kg, 52.13 MJ/kg [RNA]: 56.7894, 56.7894 m3 (2 entries); = (2181.6*1.357)/52.13; provider Natural gas, combusted in industrial equipment
  Surrogate for "heat production, natural gas, at industrial furnace low-NOx >100kW"
- Chromium, at regional storage: 117 kg
- Transport, train, diesel powered [RNA]: 111 t*km
- Transformation, from unknown: 0.105 m2
- Transport, ocean freighter, average fuel mix [RNA]: 9.89 t*km

## Inputs from nature
- Cobalt [resource, ground]: 1.5 kg
  Surrogate for cobalt production
- Land use [resource, ground]: 5.26 m2*a
- Manganese [resource, ground, subterranean]: 2.84 kg
  Surrogate for manganese production
- Nickel [emission, ground]: 19.8 kg
  Surrogate for nickel mix
- Titanium [resource, ground]: 0.374 kg
  Surrogate for "market for titanium, primary"
- Lanthanum [resource, ground, subterranean]: 0.483 kg

## Inventory method
An attributional LCI method was used to develop the dataset.

## Modelling constants
This process was adapted from Schreiber et al., 2020.

## Completeness
TREATMENT OF MISSING ENVIRONMENTAL DATA: It is unknown whether a cutoff for elementary flows was used in the original study.

TREATMENT OF MISSING TECHNOSPHERE FLOWS: It is unknown whether a cutoff for elementary flows was used in the original study. Missing technosphere flows are unknown.

MASS BALANCE: The mass imbalance for this unit process is unknown.

## Data selection
Data for the construction of a solid oxide electrolysis stack was collected and adapted from the original study, Schreiber et al., 2020.

## Data treatment
The original model used European incoming datasets, which have been switched to US based incoming datasets in this model. Flows have been adapted and emissions have been calculated for this dataset.

## Data collection
Data were collected from Schreiber et al., 2020.

## Sampling procedure
BOUNDARY CONDITIONS: The system boundary includes upstream burdens from incoming materials and process energy. The production of argon and hydrogen are excluded from the system boundary due to a lack of gas consumption data.

DATA COLLECTION: Data were collected from Schreiber et al., 2020.

UNCERTAINTY ESTIMATION: It is unknown whether an uncertainty estimation was performed.

## Intended application
The intended application for this process is for accounting purposes as described in Goal Situation C1 from the ILCD Handbook's Detailed Guidance. LCA studies with this intended application offer "purely descriptive documentation of the system under analysis (e.g., a product, sector or country), without being interested in any potential consequences on other parts of the economy.” The studies categorized under Goal Situation C1 do NOT consider existing benefits outside the analyzed system such as recycling. The target audience of this dataset is LCA practitioners, industry, the general public, and policymakers. This model was originally built for an LCA and was originally developed and analyzed with the ReCiPe and CML2001 impact assessment methods. The completeness of elementary flows is unknown and it is not an update to a previous USLCI dataset.

## Project
This project was funded by NREL.

## Sources
- Schreiber, A
