# Transport, ocean freighter, residual fuel oil powered

Dataset: openLCA process, unit process
Category: 48-49: Transportation and Warehousing/4831: Deep Sea, Coastal, and Great Lakes Water Transportation
Geography: Global
Time period: 2005-01-01 to 2013-12-31
Allocation method: no allocation
Data quality: US EPA - Process Pedigree Matrix (4;5)
Generated by: Franklin Associates, A Division of ERG
Owner: Argonne National Laboratory
Published in: Argonne National Laboratory, 2023, GREET
isCopyrightProtected: false
restrictionsDescription: These U.S. LCI Database Project data ("Data") are provided by the National Renewable Energy Laboratory ("NREL"), operated by the Alliance for Sustainable Energy, LLC ("Alliance") for the US Department of Energy ("DOE") under Contract No. DE-AC36-08GO28308. The United States Government (the "Government") retains and the user acknowledges that the Government retains a non-exclusive, paid-up, irrevocable, worldwide license to publish or reproduce the published form of these data, or allow others to do so, for Government purposes.
Access to and use of these Data shall impose the following obligations on the user, as set forth in this Agreement. The user is granted the right, without any fee or cost, to use, copy, modify, alter, enhance and distribute these Data for any purpose whatsoever, provided that this entire notice appears in all copies of the Data. Any modification, alteration or enhancement of these data shall be identified and documented by the user. Further, the user agrees to credit the DOE/NREL/Alliance in any publication that results from the use of these Data. The names DOE/NREL/Alliance, however, may not be used in any advertising or publicity to endorse or promote any products or commercial entities unless specific written permission is obtained from DOE/NREL/Alliance. The user also understands that DOE/NREL/Alliance is not obligated to provide the user with any support, consulting, training or assistance of any kind with regard to the use of these Data or to provide the user with any updates, revisions or new versions of these Data.
YOU AGREE TO INDEMNIFY THE GOVERNMENT AND DOE/NREL/ALLIANCE, AND ITS SUBSIDIARIES, AFFILIATES, OFFICERS, AGENTS, AND EMPLOYEES AGAINST ANY CLAIM OR DEMAND, INCLUDING REASONABLE ATTORNEYS' FEES, RELATED TO YOUR USE OF THESE DATA. THESE DATA ARE PROVIDED BY DOE/NREL/ALLIANCE "AS IS" AND ANY EXPRESS OR IMPLIED WARRANTIES, INCLUDING BUT NOT LIMITED TO, THE IMPLIED WARRANTIES OF MERCHANTABILITY AND FITNESS FOR A PARTICULAR PURPOSE ARE DISCLAIMED. IN NO EVENT SHALL THE GOVERNMENT OR DOE/NREL/ALLIANCE BE LIABLE FOR ANY SPECIAL, INDIRECT OR CONSEQUENTIAL DAMAGES OR ANY DAMAGES WHATSOEVER, INCLUDING BUT NOT LIMITED TO CLAIMS ASSOCIATED WITH THE LOSS OF DATA OR PROFITS, WHICH MAY RESULT FROM AN ACTION IN CONTRACT, NEGLIGENCE OR OTHER TORTIOUS CLAIM THAT ARISES OUT OF OR IN CONNECTION WITH THE ACCESS, USE OR PERFORMANCE OF THESE DATA.

## General comment
This cradle-to-gate unit process is for the transport of 1 tonne of freight 1 kilometer via residual fuel oil powered ocean freighter. This data is from The Greenhouse Gases, Regulated Emissions, and Energy Use in Transportation 2023 Model (GREET).

## Technology
This data represents the combustion of residual fuel oil in an ocean freighter. The average speed assumed is 20 miles per hour and the load factor is 83% from product origin to destination and 70% back to the origin.

## Geography
This process is representative of global ocean freighter transport.

## Time period
This unit process is representative of several years of primary data. Vessel type and characteristics data are from 2011; trip data is from 2013; engine power data is from 2013; payload data from 2010 and 2011 reports; load factors and emission factor assumptions were adapted from a 2005 report.

## Reference product
- Transport, ocean freighter, residual fuel oil powered [US]: 1 t*km

## Inputs from technosphere
- Residual fuel oil, at refinery [RNA]: 0.0049263 l; provider Petroleum refining, at refinery

## Emissions to nature
- Carbon dioxide [emission, air]: 0.0046 kg
- Carbon monoxide [emission, air]: 9.816e-6 kg
- Sulfur oxides [emission, air]: 7.806e-5 kg
- Carbon black [emission, air]: 1.352e-6 kg
- Nitrous oxide [emission, air]: 1.081e-7 kg
- Volatile organic compounds [emission, air]: 4.32e-6 kg
- Total Organic Carbon [emission, air]: 3.515e-6 kg
- Nitrogen oxides [emission, air]: 0.0001111 kg
- Methane [emission, air]: 2.477e-7 kg
- Particulate matter, ≤ 10μm [emission, air]: 9.794e-6 kg
- Particulate matter, ≤ 2.5μm [emission, air]: 9.012e-6 kg

## Inventory method
Cradle-to-gate

## Modelling constants
This process was adapted from GREET, 2023.

## Completeness
TREATMENT OF MISSING ENVIRONMENTAL DATA: Unknown. Refer to GREET, 2023

TREATMENT OF MISSING TECHNOSPHERE DATA: Unknown. Refer to GREET, 2023

MASS BALANCE: Unknown. Refer to GREET, 2023

## Data selection
This dataset was sourced from GREET, 2023. No data was excluded.

## Data treatment
Unit conversions were applied.

## Data collection
Vessel types and characteristics data are from 2011; trip data is from 2013; engine power data is from 2013; payload data from 2010 and 2011 reports; load factors and emission factor assumptions were adapted from a 2005 report.

## Sampling procedure
BOUNDARY CONDITIONS: Pump to hull, includes combustion emissions

DATA COLLECTION: GREET data is sourced from multiple data sources. These data collection efforts are described in Section 3 of the "Life Cycle Analysis of Conventionaland Alternative Marine Fuels in GREET" report.

UNCERTAINTY ESTIMATION: Unknown. Refer to GREET, 2023

## Intended application
The intended application for this process is for accounting purposes as described in Goal Situation C1 from the ILCD Handbook's Detailed Guidance. LCA studies with this intended application offer "purely descriptive documentation of the system under analysis (e.g., a product, sector or country), without being interested in any potential consequences on other parts of the economy.” The studies categorized under Goal Situation C1 do consider existing benefits outside the analyzed system such as recycling. These data are an update to a previously published dataset.

## Project
USLCI curator updates

## Sources
- Argonne National Laboratory, 2013, Marine Fuels
- Argonne National Laboratory, 2023, GREET
