# Transport, combination truck, short-haul, diesel powered, Northeast

Dataset: openLCA process, unit process
Category: 48-49: Transportation and Warehousing/4841: General Freight Trucking
Geography: Northern America
Time period: 2009-12-31 to 2009-12-31
Allocation method: no allocation
Generated by: Nathan Hardesty
Published in: U.S. Environmental Protection Agency (EP
isCopyrightProtected: false
restrictionsDescription: All information can be accessed by everybody.

## General comment
This dataset represents the Northeast U.S. (ME, NH, VT, MA, RI, CT, NY, PA, NJ, MD, DE, DC (Reference 11)) average airborne emissions for operating a diesel powered, combination truck in a short-haul manner (trips less than 200 miles [322 km]). The inventory includes all vehicle operation processes, including off-network and refueling activities.
The refinery-to-pump transportation and distribution data are calculated from Argonne National Laboratory's GREET 1.8d.1 model.
The vehicle operation data are calculated from EPA's MOVES2010a model, using the assumptions described in the corresponding detailed spreadsheet. Emissions factors in MOVES2010a are largely based on EPA's Mobile Source Observation Database, which in turn includes data from a variety of vehicle studies (References 7-9).
MOVES2010a acknowledges sources of uncertainty in the model structure, the population and acitivty data, and other model parameters. As of July 2011, the uncertainty calculation function of the model has not been activated.

## Technology
Combustion of diesel in a combination, short-haul truck.

## Geography
US

## Reference product
- Transport, combination truck, short-haul, diesel powered [RNA]: 1 t*km

## Inputs from technosphere
- Transport, barge, average fuel mix [RNA]: 0.0108633 t*km
- Transport, pipeline, unspecified petroleum products [RNA]: 0.113208 t*km
- Diesel, at refinery: 0.0348411 l; provider Petroleum refining, at refinery
- Transport, ocean freighter, average fuel mix [RNA]: 0.0767818 t*km
- Transport, combination truck, average fuel mix [RNA]: 0.0112313 t*km
- Transport, train, diesel powered [RNA]: 0.020959 t*km

## Emissions to nature
- Particulate matter, ≤ 10μm [emission, air]: 2.93333e-5 kg
  PM10 from organic carbon, elemental carbon, and sulfate particulates.
- Hydrocarbons [emission, air]: 0.000165655 kg
- Sulfur dioxide [emission, air]: 1.52354e-6 kg
- Particulate matter, ≤ 2.5μm [emission, air]: 1.84376e-7 kg
  PM2.5 from tirewear.
- Nitrogen dioxide [emission, air]: 5.1222e-5 kg
- Volatile organic compounds [emission, air]: 2.95964e-5 kg
- Particulate matter, ≤ 2.5μm [emission, air]: 2.84545e-5 kg
  PM2.5 from organic carbon, elemental carbon, and sulfate particulates.
- Nitrogen oxides [emission, air]: 0.000603885, 0.000552663 kg (2 entries)
- Methane [emission, air]: 8.15315e-7 kg
- Nitrous oxide [emission, air]: 1.02641e-7 kg
- Carbon dioxide [emission, air]: 0.0914762 kg
- Particulate matter, ≤ 10μm [emission, air]: 7.68848e-7 kg
  PM10 from tirewear.
- Ammonia [emission, air]: 1.18791e-6 kg
- Carbon monoxide [emission, air]: 0.000148223 kg
- Particulate matter, ≤ 2.5μm [emission, air]: 7.41343e-7 kg
  PM2.5 from brakewear.
- Particulate matter, ≤ 10μm [emission, air]: 2.83193e-6 kg
  PM10 from brakewear.

## Sources
- National Institute of Standards and Tech
- Eastern Research Group
- Assessment and Standards Division, Offic
- National Climatic Data Center, National
- Wang, M.
- Transportation Characteristics Branch, U
- Assessment and Standards Division, Offic
- EPA
- EPA
- U.S. Environmental Protection Agency (EP
- U.S. Alternative Fuels and Advanced Vehi
