# Transport, passenger car, gasoline powered

Dataset: openLCA process, unit process
Category: 48-49: Transportation and Warehousing/4859: Other Transit and Ground Passenger Transportation
Geography: Northern America
Time period: 2009-12-31 to 2009-12-31
Allocation method: no allocation
Generated by: Nathan Hardesty
Published in: U.S. Environmental Protection Agency (EP
isCopyrightProtected: false
restrictionsDescription: All information can be accessed by everybody.

## General comment
This dataset represents the U.S. average airborne emissions for operating a gasoline powered passenger car. The inventory includes all vehicle operation processes, including off-network and refueling activities.
The refinery-to-pump transportation and distribution data are calculated from Argonne National Laboratory's GREET 1.8d.1 model.
The vehicle operation data are calculated from EPA's MOVES2010a model, using the assumptions described in the corresponding detailed spreadsheet. Emissions factors in MOVES2010a are largely based on EPA's Mobile Source Observation Database, which in turn includes data from a variety of vehicle studies (References 6-8).
MOVES2010a acknowledges sources of uncertainty in the model structure, the population and acitivty data, and other model parameters. As of July 2011, the uncertainty calculation function of the model has not been activated.

## Technology
Combustion of gasoline in a passenger car.

## Geography
US

## Reference product
- Transport, passenger car, gasoline powered [RNA]: 1 p*km

## Inputs from technosphere
- Transport, combination truck, average fuel mix [RNA]: 0.0203091 t*km
- Transport, pipeline, unspecified petroleum products [RNA]: 0.204708 t*km
- Gasoline, at refinery: 0.0630016 l; provider Petroleum refining, at refinery
- Transport, ocean freighter, average fuel mix [RNA]: 0.138841 t*km
- Transport, barge, average fuel mix [RNA]: 0.0196436 t*km
- Transport, train, diesel powered [RNA]: 0.0378992 t*km

## Emissions to nature
- Particulate matter, ≤ 10μm [emission, air]: 5.78384e-6 kg
  PM10 from organic carbon, elemental carbon, and sulfate particulates.
- Particulate matter, ≤ 2.5μm [emission, air]: 5.32583e-6 kg
  PM2.5 from organic carbon, elemental carbon, and sulfate particulates.
- Volatile organic compounds [emission, air]: 0.000221818 kg
- Nitrogen oxides [emission, air]: 0.000306911, 0.000274987 kg (2 entries)
- Nitrous oxide [emission, air]: 5.44265e-6 kg
- Particulate matter, ≤ 10μm [emission, air]: 4.81248e-6 kg
  PM10 from brakewear.
- Particulate matter, ≤ 2.5μm [emission, air]: 5.41024e-7 kg
  PM2.5 from tirewear.
- Ammonia [emission, air]: 1.55062e-5 kg
- Sulfur dioxide [emission, air]: 2.74286e-6 kg
- Methane [emission, air]: 8.38482e-6 kg
- Carbon monoxide [emission, air]: 0.00252024 kg
- Carbon dioxide [emission, air]: 0.14748 kg
- Nitrogen dioxide [emission, air]: 3.19237e-5 kg
- Particulate matter, ≤ 2.5μm [emission, air]: 1.25981e-6 kg
  PM2.5 from brakewear.
- Particulate matter, ≤ 10μm [emission, air]: 2.25607e-6 kg
  PM10 from tirewear.
- Hydrocarbons [emission, air]: 0.000216378 kg

## Sources
- National Institute of Standards and Tech
- Eastern Research Group
- Assessment and Standards Division, Offic
- Wang, M.
- Assessment and Standards Division, Offic
- EPA
- U.S. Environmental Protection Agency (EP
- U.S. Alternative Fuels and Advanced Vehi
