# Mixed recyclables, sorted, at material recycling facility (MRF)

Dataset: openLCA process, unit process
Category: 56: Administrative and Support and Waste Management and Remediation Services/5629: Remediation and Other Waste Management Services
Geography: United States
Time period: 2007-12-24 to 2009-12-24
Allocation method: no allocation
Data quality: US EPA - Process Pedigree Matrix (4;1)
Generated by: Franklin Associates, A Division of ERG
Owner: ACC, APR, NAPCOR, & PETRA
Published in: Franklin Associates (2011) LCI HDPE & PET Recycled Resin
isCopyrightProtected: false
restrictionsDescription: These U.S. LCI Database Project data ("Data") are provided by the National Renewable Energy Laboratory ("NREL"), operated by the Alliance for Sustainable Energy, LLC ("Alliance") for the US Department of Energy ("DOE") under Contract No. DE-AC36-08GO28308. The United States Government (the "Government") retains and the user acknowledges that the Government retains a non-exclusive, paid-up, irrevocable, worldwide license to publish or reproduce the published form of these data, or allow others to do so, for Government purposes.
Access to and use of these Data shall impose the following obligations on the user, as set forth in this Agreement. The user is granted the right, without any fee or cost, to use, copy, modify, alter, enhance and distribute these Data for any purpose whatsoever, provided that this entire notice appears in all copies of the Data. Any modification, alteration or enhancement of these data shall be identified and documented by the user. Further, the user agrees to credit the DOE/NREL/Alliance in any publication that results from the use of these Data. The names DOE/NREL/Alliance, however, may not be used in any advertising or publicity to endorse or promote any products or commercial entities unless specific written permission is obtained from DOE/NREL/Alliance. The user also understands that DOE/NREL/Alliance is not obligated to provide the user with any support, consulting, training or assistance of any kind with regard to the use of these Data or to provide the user with any updates, revisions or new versions of these Data.
YOU AGREE TO INDEMNIFY THE GOVERNMENT AND DOE/NREL/ALLIANCE, AND ITS SUBSIDIARIES, AFFILIATES, OFFICERS, AGENTS, AND EMPLOYEES AGAINST ANY CLAIM OR DEMAND, INCLUDING REASONABLE ATTORNEYS' FEES, RELATED TO YOUR USE OF THESE DATA. THESE DATA ARE PROVIDED BY DOE/NREL/ALLIANCE "AS IS" AND ANY EXPRESS OR IMPLIED WARRANTIES, INCLUDING BUT NOT LIMITED TO, THE IMPLIED WARRANTIES OF MERCHANTABILITY AND FITNESS FOR A PARTICULAR PURPOSE ARE DISCLAIMED. IN NO EVENT SHALL THE GOVERNMENT OR DOE/NREL/ALLIANCE BE LIABLE FOR ANY SPECIAL, INDIRECT OR CONSEQUENTIAL DAMAGES OR ANY DAMAGES WHATSOEVER, INCLUDING BUT NOT LIMITED TO CLAIMS ASSOCIATED WITH THE LOSS OF DATA OR PROFITS, WHICH MAY RESULT FROM AN ACTION IN CONTRACT, NEGLIGENCE OR OTHER TORTIOUS CLAIM THAT ARISES OUT OF OR IN CONNECTION WITH THE ACCESS, USE OR PERFORMANCE OF THESE DATA.

## General comment
This attributional unit process LCI represents the incoming transport of collected mixed recyclables to the material recycling facility (MRF) and energy requirements for the subsequent sorting and separation of recyclable materials; i.e., the sorting of plastics from other co-collected recovered materials (such as paper, steel, and aluminum), and separating mixed plastics into individual resins. The LCI study was conducted by Franklin Associates, Ltd. and sponsored jointly by NAPCOR, the American Chemistry Council (ACC), the Association of Postconsumer Plastic Recyclers (APR), and the PET Resin Association (PETRA). Using life cycle inventory (LCI) methodology, the study determines and quantifies the energy requirements, solid wastes, and atmospheric and waterborne emissions for the processes required to collect postconsumer PET and HDPE packaging, sort and separate the material, and reprocess it into clean recycled resin.

Important note: although most of the data in the US LCI database has undergone some sort of review, the database as a whole has not yet undergone a formal validation process. Please email comments to lci@nrel.gov.

## Technology
Technology mix of typical sorting and separation operations at material recycling facilities (MRFs) in US; Single-sort high tech 26.3%; dual-sort high tech 25.7%; dual-sort low tech 26.7%; multi-sort low tech 21.3%

## Geography
United States

## Time period
Data compiled 2010 from most recent sources

## Reference product
- Mixed recyclables, sorted, at material recycling facility (MRF) [US]: 1 kg
  Because the MRF operating data were allocated over all the pounds of recovered recyclables, this data set can be applied to a kg of any recyclable material output (plastics, paper, steel, aluminum, etc.)

## Inputs from technosphere
- Electricity, AC, 2300-7650 V: 0.0576 MJ; provider Electricity; at grid; consumption mix - US - US
- Liquefied petroleum gas, combusted in industrial boiler [RNA]: 0.0025 l
- Mixed recyclables, for material recycling facility (MRF) [US]: 1.09 kg; provider Mixed recyclables, recovered for material recycling facility (MRF)
  Includes wt of contaminants in incoming material.
- Natural gas, combusted in industrial boiler [RNA]: 2.2e-6 m3
- Transport, single unit truck, diesel powered [RNA]: 0.0261 t*km
  Represents transport of inbound material to be sorted, including contaminants
- Transport, combination truck, diesel powered [RNA]: 0.0282 t*km
  Represents transport of inbound material to be sorted, including contaminants
- Diesel, combusted in industrial boiler [RNA]: 0.0018 l

## Waste to treatment
- Disposal, solid waste, unspecified, to unspecified landfill: 0.087 kg
  Disposal of contaminants removed from material at sorting facility

## Inventory method
Attributional; data sets for the three recycling unit processes (collection, sorting/separation, reclaimer operations) were linked to cover the full sequence of processing steps required to produce recycled resins  gate-to-gate results; for cradle-to-gate LCI of recycled resin, the practitioner needs to make decision about virgin resin burdens associated with the postconsumer products that are feedstocks to recycling. Recycling occurs in the context of a product made from resin; use and end-of-life management of the material will depend on the product in which it is used

## Modelling constants
Postconsumer plastics that are collected mixed with other materials must be separated; data are from Material Recovery Facilities (MRFs) – 4 data sets and Plastic Recycling Facility (PRF) – 1 confidential data set
MRF data validated by checking against equipment data in EPA’s MSW Decision Support Tool; Each facility’s data on material transport, energy use, and solid wastes were normalized to basis of 1000 lb of output from the facility; Weighted average sorting/separation data set was compiled for each resin based on percent of total postconsumer supply sorted at MRF and PRF facilities

Transport requirements include transporting weight of incoming contaminant materials.

## Completeness
TREATMENT OF MISSING ENVIRONMENTAL DATA
Elementary flows are cut-off at less than 1% based on environmental relevance.

TREATMENT OF MISSING TECHNOSPHERE DATA
Intermediate flows are cut-off at less than 1% based on environmental relevance. Capital equipment is not included in this unit process.

MASS BALANCE
Mixed recyclables acontainer inputs include the weight of contaminants in incoming material. Inputs of waste amounts to disposal are for disposal of contaminants removed from material at sorting facility.

## Data selection
Once the postconsumer PET, HDPE, and PP have been collected, they must be separated from other co-collected materials and plastics. Although some recovered plastic is separated by curbside sorting and the use of separate bins at drop-off recycling centers, sorting and separation of plastics most commonly takes place at material recovery facilities (MRFs). Sorting operations at MRFs range from manual sorting of items on a conveyor to highly automated systems using magnets, air classifiers, optical sorters, and other technologies to sort and separate mixed incoming materials. Postconsumer plastics may be separated and baled as mixed plastics, or the facility may have the capability to further sort down to individual resin bales.

## Data treatment
For sorting at MRFs, total solid wastes were allocated over the total pounds of useful output, so that the pounds of MRF sorting waste is the same for 1,000 pounds of output, whether it is PET, HDPE, PP. The same approach was used to calculate the sorting waste per 1,000 pounds of output material for the PRF. Other assumtions and calculations described in Data Treatment & Modeling Constants.

## Sampling procedure
BOUNDARY CONDITIONS
Processing steps include the incoming transport of collected mixed recyclables to the material recycling facility (MRF) and energy requirements for the subsequent sorting of plastics from other co-collected recovered materials (such as paper, steel, and aluminum), and separating mixed plastics into individual resins.

DATA COLLECTION
For the original (2011) recycled resin analysis, data were collected from MRFs and a PRF using data collection forms developed specifically for the project by ERG. Four completed MRF surveys and one completed PRF survey were received. For the MRFs, one data set was for a large facility that processed both single-stream and dual-stream collected material, two were for medium dual-stream facilities, and one was for a small dual-stream facility. The data provided on the forms included information on the sources of material received at theMRF, the transportation mode and distance for incomingmaterial from each source, the types and quantities of useful materials recovered from the incoming material, the types of equipment used at the facility, energy and water use at the facility, and the solid wastes, atmospheric and waterborne emissions from the facility. For each facility, the operating data were allocated over the total weight of recovered materials. Individual MRF facility data cannot be shown because of data confidentiality; however, a
weighted average data set was developed based on the amount of collected plastic material processed at each type of facility, using the single- and dual-stream collection data compiled for collection percent by type.

UNCERTAINTY ESTIMATION
No uncertainty estimations were included.

## Intended application
"Accounting, with system-external interactions" - The intended application is a purely descriptive accounting / documentation of the analysed system including existing interactions with other systems in the LCI model.

## Project
LIFE CYCLE INVENTORY OF 100% POSTCONSUMER HDPE AND PET RECYCLED RESIN FROM POSTCONSUMER CONTAINERS AND PACKAGING PREPARED FOR THE PLASTICS DIVISION OF THE AMERICAN CHEMISTRY COUNCIL, INC. THE ASSOCIATION OF POSTCONSUMER PLASTIC RECYCLERS (APR), THE NATIONAL ASSOCIATION FOR PET CONTAINER RESOURCES (NAPCOR), AND THE PET RESIN ASSOCIATION (PETRA) BY FRANKLIN ASSOCIATES, A DIVISION OF ERG PRAIRIE VILLAGE, KANSAS JANUARY 19, 2011.

## Review 
The LCI study was conducted by Franklin Associates, Ltd. and sponsored jointly by NAPCOR, the American Chemistry Council (ACC), the Association of Postconsumer Plastic Recyclers (APR), and the PET Resin Association (PETRA). Using life cycle inventory (LCI) methodology, the study determines and quantifies the energy requirements, solid wastes, and atmospheric and waterborne emissions for the processes required to collect postconsumer PET and HDPE packaging, sort and separate the material, and reprocess it into clean recycled resin. The data has had a partial critical review by internal parties.

## Sources
- Franklin Associates (2011) LCI HDPE & PET Recycled Resin
